folder simulations: version=37; creator=Apsim 7.10-r4218
  simulation Generic
    clock
      start_date = 01/01/2018  # Enter the start date of the simulation
      end_date = 31/12/2018  # Enter the end date of the simulation
    summaryfile
    manager2 Script(C#)
      A = Parameter value  # Param A
```csharp
using RDotNet;
using System;
using System.Collections.Generic;
using System.IO;
using System.Linq;
using System.Text;
using System.Threading.Tasks;
using ModelFramework;
using System.ComponentModel;


public class Script 
{      
   [Link()] public Simulation MySimulation;
   public REngine engine = REngine.GetInstance();

   [Input] double day; 
   [Input] double year; 
   public Clock ck;

   // Customizable settings for run (1 and 0) 
   double free = 0;
   double miyoshi = 1;
   double method = 4; // This is either 1-EnKF (w or w/o miyoshi) or 2- GEF (Fully Bayesian) 3- ML, 4- 4DEnVar
   double p = 0.5; 
   double Rcov = 0; // 0 == R is diagonal matrix, independent observation errors
   int[] cropOrder = {1,0,1,1};
   int yrindex = -1; 
   int window_length = 30;
   int window_counter = 0;
   bool Assimilate_day = false;
   int first_obs_day = -1;
   int first_obs_year = -1;
   

   // The following event handler will be called once at the beginning of the simulation
   [EventHandler] public void OnInitialised(){

      engine = Initialize(engine, MySimulation, miyoshi, method, p, Rcov);
      first_obs_day = engine.Evaluate("(strsplit(names(obs.list)[1], '-')[[1]])[1]").AsInteger().Single();
      first_obs_year = engine.Evaluate("(strsplit(names(obs.list)[1], '-')[[1]])[2]").AsInteger().Single();
      
   } // end OnInitialised()

   [EventHandler] public void OnPost(){
         
      // initialize some variables
      engine.Evaluate("specL <- NULL"); 

      // this index allows us to iterate through the correct crop components for each simulation year 
      if (day == 1){
         yrindex += 1; 

         // this section resets the Miyoshi parameters at the beginning of each year (kind of a hack; feel like this should be after a certain number of days without data) 
         //engine.Evaluate("R <- NULL;theta <- NULL"); 
      } 

      // loop through paddocks to collect info from forecast 
      foreach (Paddock paddock in MySimulation.ChildPaddocks) {

         object soil = paddock.LinkByType("SoilWat");
         object soiln = paddock.LinkByType("SoilN");
	 
         ModelFramework.Component crop = paddock.Crops[cropOrder[yrindex]];
         object cropobj = paddock.LinkByType(crop.Name);
         
         // RTM function
         engine = RTM_runner(engine, crop, ((SoilWat) soil), 20);

         // gathering information on this day's forecast
         engine = date_info(engine, day, year, paddock.FullName.ToString());

         // reading forecast from model outputs for the day
         engine = get_model_results(engine, crop, cropobj, ((SoilWat) soil), ((SoilN) soiln));         

      } // end collection for each paddock 

      // data assimilation step (if this is not a free run) 
      if (free == 0){
         // For 4DEnVar if today is greater than the first time we have obs , start counting the window
         if(day >= first_obs_day & year >= first_obs_year & day <330) {
            // Decide if we assimilate today based on the first obs and method
            window_counter = window_counter + 1;
         }
         // step 1: do we have data for this step? 
         NumericMatrix SDA = engine.Evaluate("as.matrix(ifelse(today %in% names(obs.list), 1, 0))").AsNumericMatrix();
         
         if(method != 4) {
            if (SDA[0, 0] == 1)   {
               Assimilate_day = true;
               // if it's sequantial then I need today's info
               engine.Evaluate("Observed <- get_Observed(today, obs.list, dateinfo)");
            }
         }else{
            // if it's 4DEnVar then the first one is enough to get the state vars
            engine.Evaluate("Observed <- obs.list[[1]]");
            
            if(window_counter == window_length) Assimilate_day = true;
         }
         
         // if we have data, let's assimilate!
         if (Assimilate_day){
           
         
               // step 2: prepare the observed data object 
               string[] statVars = engine.Evaluate("Observed$Forecast.name").AsCharacter().ToArray();
               string[] set_modules = engine.Evaluate("Observed$Module").AsCharacter().ToArray();
               string[] set_names = engine.Evaluate("Observed$Apsim.Set.Name").AsCharacter().ToArray();

           
              
               // prepare the forecasted data objects 
               engine.Evaluate("Forecast$X <- get_Forecast(data.all," + day + "," + year + ")"); 
               engine.Evaluate("Maintained <- Forecast$X");
        
            // step 3: data assimilation 
            // `H` is the third Argument of the DA function which provides a mapping between forecasts and observed

            GenericVector DAResult = engine.Evaluate(@"
                             
               if(length(SDA.out)>0) {
               if(!is.null(SDA.out[length(SDA.out)])) {
               tmp.sda.out <- SDA.out %>% purrr::discard(~ length(.x)==1)

               if(length(tmp.sda.out)>0) Forecast$Q <- tmp.sda.out[length(tmp.sda.out)][[1]]$Q
               }
               }
               Forecast$specL <- specL
               vals <- data_assimilation(Forecast, Observed, R, theta, miyoshi, DA.method, p, Rcov)
               DAR <- vals$DAR
               DAR$Time <- Time
               R <- vals$R
               theta <- vals$theta
               adjusted <- nextStep(vals$Xa, Maintained)
               DAR$adjusted<-adjusted
                                       
               SDA.out[[Date_APSIM_to_R(Time$Year, Time$Day)]] = DAR

               adjusted
               ").AsList();

            // step 4: send assimilation ensemble adjustment back to APSIM
            if(DAResult != null){
               write_back(engine, MySimulation, statVars, set_modules, set_names, DAResult);
               window_counter = 0;
               Assimilate_day = false;
            }

         } else{ // if we don't have observations

            engine.Evaluate("DAR <- list()");
            engine.Evaluate("DAR$Time <- Time");
            //engine.Evaluate("DAR$Spectra <- specL"); and removed this line from above: DAR$Spectra <- specL
            engine.Evaluate("SDA.out[[Date_APSIM_to_R(Time$Year, Time$Day)]] = DAR"); 

         }	

      } else{ // if this is a free run 

         engine.Evaluate("DAR <- list()");
         engine.Evaluate("DAR$Time <- Time");
         //engine.Evaluate("DAR$Spectra <- specL");
         engine.Evaluate("SDA.out[[Date_APSIM_to_R(Time$Year, Time$Day)]] = DAR"); 

      } // end free/SDA conditional


      // save CSV file if simulation is over 
      if(ck.is_end_simulation){
         //engine.Evaluate("write.csv(data.all, file = 'dailyOutput.csv', row.names = FALSE)");
         engine.Evaluate("save(SDA.out, file = 'sda.out.Rdata')");      
         engine.Evaluate("save.image('GlobalEnv.RData')");  
               
         //Write model results to the db
         engine.Evaluate("submit_result_Sqlite()");
         engine.Evaluate("data.all <- NULL"); // This variable keeps the model outputs. I empty it after writing it into the db so it would not accumulate over time
         engine.Dispose();
      }

   } // End onPost()     

   // Function to initialize some variables for simulation and storage 
   public REngine Initialize(REngine engine, Simulation MySimulation, double miyoshi, double method, double p, double Rcov){
   
      engine.Evaluate("miyoshi <- " + miyoshi); 
      engine.Evaluate("p <- " + p);
      engine.Evaluate("Rcov <- " + Rcov); 
      engine.Evaluate("DA.method <- " + method);
      engine.Evaluate("window_length <- " + window_length);
      
      ck = (Clock) MySimulation.LinkByName("clock");
      engine.Initialize(); // required since v1.5    
      engine.Evaluate("library(hsdar)");
      engine.Evaluate("library(dplyr)");
      engine.Evaluate("source('EnKF.R')");
   
      // defining variables for storage
      engine.Evaluate("data.all <- NULL;SDA.out <- list();Forecast <- list(Q=1);Observed <- list();Time <- list()");
      engine.Evaluate("X <- NULL;DAR <- NULL;dd <- NULL;R <- NULL;theta <- NULL");  
 
      // get data for the run if this isn't a free run   
      if (free == 0){
         engine.Evaluate("load(list.files(pattern='obs.list'))");
      }
      
      return engine;
   } // end Initialize() function 

   // function to write adjusted values back into the model for the next forecast
   public void write_back(REngine engine, Simulation MySimulation, string[] statVars, string[] set_modules, string[] set_names, GenericVector DAResult){   

      // loop over stat variables that are going to be assimilated
      for (int i = 0; i < statVars.Length; i++) { 
     
         // read the result for the first state variables
         var tmp_res = DAResult[statVars[i]].AsDataFrame();
         engine.SetSymbol("tmp_res", tmp_res);
  
         // now loop over ensembles and write the adjusted variables back to the model     
         for (int j = 0; j < MySimulation.ChildPaddocks.Count; j++) { 

            // subset a row for each ensemble
            double[] row = engine.Evaluate("as.numeric(unlist(tmp_res[" + (j + 1) + ",])) ").AsNumeric().ToArray();

            Paddock paddock_set = MySimulation.ChildPaddocks[j];
                                         
            // set values based on their module
            if (set_modules[i] == "SoilN"){
               object soil_set1 = paddock_set.LinkByType("SoilN");
               ((SoilN) soil_set1).Set(set_names[i], row);		  
                           
            }else if (set_modules[i] == "SoilWat"){
               object soil_set2 = paddock_set.LinkByType("SoilWat");
               ((SoilWat) soil_set2).Set(set_names[i], row);

            }else if (set_modules[i] == "MaizeSoil"){
               object crop = paddock_set.LinkByType("Maize");
               ((Maize) crop).Set(set_names[i], row);

            }                        
         }
      }
   } // end write_back() function
 
   // function to collet model forecast results for the current time step 
   public REngine get_model_results(REngine engine, ModelFramework.Component crop, object cropobj, SoilWat soilwc, SoilN soiln){
      //"WaterSD", "swdef_photo", "transpiration", "swdef_pheno","swdef_expan","sw_supply","sw_demand", "nfact_photo", "nfact_grain"
      // ------- Crop variables
      string[] out_vars = {"biomass","lai","yield"};
      foreach(string out_var in out_vars){
         double tmp_out = 0; 
         crop.Get(out_var, out tmp_out);
         engine.Evaluate("dd$" + out_var + "<-" + Math.Round(tmp_out, 2));
      }

      // ------- Soil state variables
      // Loop through all the layers and collect info on all variables

      for (int i = 0; i < soilwc.dlayer.Length; i++) {

         // ------- soil temp
         //    engine.Evaluate("dd$st"+(i+1)+" <- " + Math.Round(soiln.st[i], 2));

         // ------- soil water
         engine.Evaluate("dd$sw" + (i + 1) + " <- " + Math.Round(soilwc.sw[i], 3));

         // ------- soil no3
         //engine.Evaluate("dd$no3_"+(i+1)+" <- " + Math.Round(soiln.no3[i], 2));
         // ------- soil nh4
         //engine.Evaluate("dd$nh4_"+(i+1)+" <- " + Math.Round(soiln.nh4[i], 2));
         // ------- total soil N
         //engine.Evaluate("dd$ntot_"+(i+1)+" <- " + Math.Round(soiln.nit_tot[i], 2));
         // ------- N mineralization rates 
         //engine.Evaluate("dd$nmin_"+(i+1)+" <- " + Math.Round(soiln.dlt_n_min_tot[i], 2));
         // ------- soil saturated conductivity
          engine.Evaluate("dd$sat" + (i + 1) + " <- " + Math.Round(soilwc.sat[i], 2));
          engine.Evaluate("dd$dul" + (i + 1) + " <- " + Math.Round(soilwc.dul[i], 2));
         engine.Evaluate("dd$ll15" + (i + 1) + " <- " + Math.Round(soilwc.ll15[i], 2));
         // engine.Evaluate("dd$ks" + (i + 1) + " <- " + Math.Round(soilwc.ks[i], 2));
         // ------- soil bulk density
          engine.Evaluate("dd$bd" + (i + 1) + " <- " + Math.Round(soilwc.bd[i], 2));
         // ------- soil saturated water flow conductivity
         engine.Evaluate("dd$swcon" + (i + 1) + " <- " + Math.Round(soilwc.swcon[i], 2));
         int n;

      }
            
      engine.Evaluate("dd$drain <- " + soilwc.drain);
      
      // adding info to simulation storage variables
      engine.Evaluate("dd <- as.data.frame(dd)");
      engine.Evaluate("data.all <- rbind(data.all, dd)");
      
      return engine;
   }  // end get_model_results() function 

   // Function that couples APSIM with RTM model 
   public REngine RTM_runner(REngine engine, ModelFramework.Component crop, SoilWat soilwc, int n){
      
      // initialize storage variables 
      double lai_tmp;
      double biomass;
      double yieldc;
      double LeafGreenNConc = 0;
      double drain = 0; 
      double LeafGreenWt = 0; 
      double GPLA = 0; 
      double biomass_wt = 0; 

      // extract variables for RTM model 
      crop.Get("lai", out lai_tmp);
      crop.Get("yield", out yieldc); 
      crop.Get("biomass", out biomass);
      crop.Get("LeafGreenNConc", out LeafGreenNConc); 
      crop.Get("LeafGreenWt", out LeafGreenWt);
      crop.Get("TPLA", out GPLA);
      crop.Get("biomass_wt", out biomass_wt);

      // PROSAIL function will break if sla is Inf (aka if LeafGreenWt is 0)
      if (LeafGreenWt != 0 & lai_tmp > 0.2){

         // estimating values for RTM model 
         engine.Evaluate("sla <-" + lai_tmp * 10 / (LeafGreenWt));
         
         engine.Evaluate("lai_tmp <-" + lai_tmp);
         engine.Evaluate("psoil <-" + soilwc.sw[0] / soilwc.sat[0]);

         // https://www.sciencedirect.com/science/article/pii/S0303243413000469
         engine.Evaluate("cab <-" + ((LeafGreenNConc * LeafGreenWt) - 0.2057) / 10); 
         engine.Evaluate("car <- cab/4.11");
         engine.Evaluate(@"n <- " + n +@"
            parameter <- data.frame(N =(0.025 + (0.9*sla))/(sla-0.0999999),
            LAI = " + lai_tmp + @",
            Cab=cab,
            Car=car,
            Cw=runif(n,0.01,0.03),
            Cm=(1/sla/1000),
            Cbrown=runif(n,0.01,0.99),
            hspot=runif(n,0.01,.2), 
            psoil=psoil
            )");
         
         engine.Evaluate("spectra <- hsdar::PROSAIL(parameterList = parameter)");  
         engine.Evaluate("temp <- data.frame(vegindex(spectra, index=c('NDVI','OSAVI','EVI','Green NDVI', 'MSAVI','NDVI3')))");
         engine.Evaluate(@"
            dd <- apply(temp, 2, mean, na.rm = TRUE)
            parameter <- data.frame(LeafGreenNConc=" + LeafGreenNConc + ",LeafGreenWt=" + LeafGreenWt + ",lai=" + lai_tmp + ", swc=" + soilwc.sw[0] + ", sat=" + soilwc.sat[0] + "); ");
      } else{
         
         // here we have to add empty values so the row is the correct length 
         engine.Evaluate("spectra <- NULL; parameter <- data.frame()");
         engine.Evaluate(@"dd <- list(NDVI = 0, OSAVI = 0, EVI = 0, `Green NDVI`= 0, MSAVI = 0, NDVI3 = 0)");
      }  
      
      engine.Evaluate("specL <- c(specL, list(parameter)) ");
      return engine;
   } // end RTM_runner() function

   // Function to get information for this time step 
   public REngine date_info(REngine engine, double day, double year, string name){
    
      NumericVector dateinfo = engine.CreateNumericVector(new double[] {day, year}); 
      engine.SetSymbol("dateinfo", dateinfo);
      engine.Evaluate("dd$day <-" + day);
      engine.Evaluate("dd$year <-" + year);
      engine.Evaluate("dd$sim <- getwd()");
      engine.Evaluate("dd$ensemble <- '" + name + "'");
      
      engine.Evaluate("Time$Day <- " + day);
      engine.Evaluate("Time$Year <-" + year); 
      engine.Evaluate("today <- paste0(" + day + ",'-'," + year + ")"); 
      
      return engine;
   } // end data_info() function
         
}
```
      Reference
        ref = RDotNet.dll  # Path to assembly
      Reference Reference1
        ref = RDotNet.NativeLibrary.dll  # Path to assembly
      Reference Reference2
        ref = DynamicInterop.dll  # Path to assembly
    area paddock
      metfile met: filename=met00004.met
      Soil: Site=?
        Comment = ICASA Classification: Unknown  # Comments
        DataSource = GSDE
        Water
          Thickness  BD       AirDry     LL15      DUL       SAT
          45         1.20785  0.0836355  0.167271  0.33664   0.431687
          46         1.42952  0.0711935  0.142387  0.322977  0.418782
          75         1.36588  0.0872395  0.174479  0.349391  0.438496
          123        1.36588  0.0872395  0.174479  0.349391  0.438496
          204        1.47     0.092723   0.185446  0.356297  0.444352
          336        1.39     0.1175935  0.235187  0.388787  0.472263
          554        1.6      0.069705   0.13941   0.246087  0.393007
          SoilCrop Maize
            LL=[0.167271, 0.142387, 0.174479, 0.174479, 0.185446, 0.235187, 0.13941]
            KL=[0.08, 0.08, 0.08, 0.08, 0.08, 0.0647333, 0.0478]
            XF=[1, 1, 1, 1, 1, 1, 1]
          SoilCrop Soybean: same as Generic.paddock.Soil.Water.Maize
        SoilWater: SummerCona=3.5; SummerU=6; SummerDate=1-Nov; WinterCona=3.5; WinterU=6; WinterDate=1-Apr; DiffusConst=40; DiffusSlope=16; Salb=0.1; CN2Bare=75; CNRed=20; CNCov=0.8; Thickness=[45, 46, 75, 123, 204, 336, 554]; SWCON=[0.35, 0.3, 0.3, 0.3, 0.3, 0.3, 0.3]
        SoilOrganicMatter: RootCN=45; RootWt=500; SoilCN=14.5; EnrACoeff=7.4; EnrBCoeff=0.2
          Thickness  OC        FBiom  FInert
          45.0       5.02179   0.04   0.4
          46         2.03928   0.035  0.4
          75         1.70085   0.03   0.410667
          123        1.70085   0.025  0.492667
          204        1.12811   0.02   0.628667
          336        0.629113  0.015  0.890833
          554        0.70049   0.01   0.95
        Analysis: Thickness=[45.0, 46, 75, 123, 204, 336, 554]
          PH=[5.69293, 5.85139, 5.78937, 5.78937, 5.79072, 5.44927, 6.74547]
        Sample Initial nitrogen
          Thickness  NO3       NH4
          45.0       5.02179   .1
          46         2.03928   .1
          75         1.70085   .1
          123        1.70085   .1
          204        1.12811   .1
          336        0.629113  .1
          554        0.70049   .1
          Date = 01/01/2018  # Sample date
        InitialWater: FractionFull=0.428706; PercentMethod=EvenlyDistributed; RelativeTo=ll15
      surfaceom SurfaceOrganicMatter
        PoolName = OrganicMatter  # Organic Matter pool name
        type = maize  # Organic Matter type
        mass = 1545.2  # Initial surface residue (kg/ha)
        cnr = 80.0  # C:N ratio of initial residue
        standing_fraction = 0  # Fraction of residue standing
      fertiliser
      Maize
        ini: filename=Maize.xml
      Soybean
        ini: filename=Soybean.xml
      folder Manager folder
        operations
          08/05/2018  Maize sow plants = 8.4, sowing_depth = 38, cultivar = CC0000, row_spacing = 760.0, crop_class = plant
          09/10/2018  Maize harvest
          09/10/2018  Maize end_crop
          08/05/2018  fertiliser apply amount = 101 (kg/ha), type = urea_N, depth = 60 (mm)
          08/05/2018  fertiliser apply amount = 288.57 (kg/ha), type = NH4NO3, depth = 60 (mm)
          08/05/2018  SurfaceOrganicMatter tillage type=disc, f_incorp=0, tillage_depth=50
          24/10/2018  SurfaceOrganicMatter tillage type=chisel, f_incorp=0, tillage_depth=150
          17/05/2019  Soybean sow plants = 34.6, sowing_depth = 38, cultivar = Hornbeck_HBK4891_4.0, row_spacing = 760.0, crop_class = plant
          09/10/2019  Soybean harvest
          09/10/2019  Soybean end_crop
          12/05/2020  Maize sow plants = 8.4, sowing_depth = 38, cultivar = CC0000, row_spacing = 760.0, crop_class = plant
          14/10/2020  Maize harvest
          14/10/2020  Maize end_crop
          12/05/2020  fertiliser apply amount = 101 (kg/ha), type = urea_N, depth = 60 (mm)
          12/05/2020  fertiliser apply amount = 288.57 (kg/ha), type = NH4NO3, depth = 60 (mm)
          14/05/2021  Maize sow plants = 8.4, sowing_depth = 38, cultivar = CC0000, row_spacing = 760.0, crop_class = plant
          30/09/2021  Maize harvest
          30/09/2021  Maize end_crop
          13/05/2021  fertiliser apply amount = 101 (kg/ha), type = urea_N, depth = 60 (mm)
          13/05/2021  fertiliser apply amount = 288.57 (kg/ha), type = NH4NO3, depth = 60 (mm)
        manager Reset
          # When should a reset be done
          reset_date = 1-jan  # Enter date of reset (dd-mmm)
          # Reset details
          soilmodule = Soil  # Name of your soil module
          surfaceommodule = SurfaceOrganicMatter  # Name of your surface organic matter module
          resetWater = no  # Reset soil water?
          resetNitrogen = no  # Reset soil nitrogen?
          resetSurfaceOM = yes  # Reset surface organic matter?
          on start_of_day:
```
         if (today = date('[reset_date]')) then
            resetWater = '[resetWater]'
            resetNitrogen  = '[resetNitrogen]'
            resetSurfaceOM = '[resetSurfaceOM]'
            if (resetWater = 'yes') then
                '[soilmodule] Water' reset
            endif
            if (resetNitrogen = 'yes') then
                '[soilmodule] Nitrogen' reset
            endif
            if (resetSurfaceOM = 'yes') then
                '[surfaceommodule]' reset
            endif
            act_mods reseting
         endif
```
    area paddock1
      metfile met: filename=met00006.met
      Soil: Site=?
        Comment = ICASA Classification: Unknown  # Comments
        DataSource = GSDE
        Water
          Thickness  BD       AirDry     LL15      DUL       SAT
          45.0       1.32023  0.0891665  0.178333  0.356363  0.443969
          46         1.46556  0.087875   0.17575   0.349862  0.43908
          75         1.45293  0.0953095  0.190619  0.360115  0.447722
          123        1.45293  0.0953095  0.190619  0.360115  0.447722
          204        1.41     0.110153   0.220306  0.381586  0.466539
          336        1.4      0.11687    0.23374   0.387383  0.470969
          554        1.58     0.076414   0.152828  0.27876   0.403486
          SoilCrop Maize
            LL=[0.178333, 0.17575, 0.190619, 0.190619, 0.220306, 0.23374, 0.152828]
            KL=[0.08, 0.08, 0.08, 0.08, 0.08, 0.0647333, 0.0478]
            XF=[1, 1, 1, 1, 1, 1, 1]
          SoilCrop Soybean
            LL=[0.178333, 0.17575, 0.190619, 0.190619, 0.220306, 0.23374, 0.152828]
            KL=[0.08, 0.08, 0.08, 0.08, 0.08, 0.0647333, 0.0478]
            XF=[1, 1, 1, 1, 1, 1, 1]
        SoilWater: SummerCona=3.5; SummerU=6.0; SummerDate=1-Nov; WinterCona=3.5; WinterU=6.0; WinterDate=1-Apr; DiffusConst=40; DiffusSlope=16; Salb=0.1; CN2Bare=75.0; CNRed=20; CNCov=0.8; Thickness=[45.0, 46, 75, 123, 204, 336, 554]; SWCON=[0.3, 0.3, 0.3, 0.3, 0.3, 0.3, 0.3]
        SoilOrganicMatter: RootCN=45; RootWt=500; SoilCN=14.5; EnrACoeff=7.4; EnrBCoeff=0.2
          Thickness  OC        FBiom  FInert
          45.0       3.74711   0.04   0.4
          46         1.87507   0.035  0.4
          75         1.55843   0.03   0.410667
          123        1.55843   0.025  0.492667
          204        1.16825   0.02   0.628667
          336        0.753655  0.015  0.890833
          554        0.517051  0.01   0.95
        Analysis: Thickness=[45.0, 46, 75, 123, 204, 336, 554]
          PH=[5.93755, 5.63962, 5.92578, 5.92578, 5.55824, 6.20203, 7.09971]
        Sample Initial nitrogen
          Thickness  NO3       NH4
          45.0       3.74711   .1
          46         1.87507   .1
          75         1.55843   .1
          123        1.55843   .1
          204        1.16825   .1
          336        0.753655  .1
          554        0.517051  .1
          Date = 01/01/2018  # Sample date
        InitialWater: FractionFull=0.0525771; PercentMethod=EvenlyDistributed; RelativeTo=ll15
      surfaceom SurfaceOrganicMatter
        PoolName = OrganicMatter  # Organic Matter pool name
        type = maize  # Organic Matter type
        mass = 1049.2817  # Initial surface residue (kg/ha)
        cnr = 80.0  # C:N ratio of initial residue
        standing_fraction = 0  # Fraction of residue standing
      fertiliser
      Maize
        ini: filename=Maize.xml
      Soybean
        ini: filename=Soybean.xml
      folder Manager folder
        operations
          08/05/2018  Maize sow plants = 8.4, sowing_depth = 38, cultivar = CC0001, row_spacing = 760.0, crop_class = plant
          09/10/2018  Maize harvest
          09/10/2018  Maize end_crop
          08/05/2018  fertiliser apply amount = 101 (kg/ha), type = urea_N, depth = 60 (mm)
          08/05/2018  fertiliser apply amount = 288.57 (kg/ha), type = NH4NO3, depth = 60 (mm)
          08/05/2018  SurfaceOrganicMatter tillage type=disc, f_incorp=0, tillage_depth=50
          24/10/2018  SurfaceOrganicMatter tillage type=chisel, f_incorp=0, tillage_depth=150
          17/05/2019  Soybean sow plants = 34.6, sowing_depth = 38, cultivar = Mississippi_3.9, row_spacing = 760.0, crop_class = plant
          09/10/2019  Soybean harvest
          09/10/2019  Soybean end_crop
          12/05/2020  Maize sow plants = 8.4, sowing_depth = 38, cultivar = CC0001, row_spacing = 760.0, crop_class = plant
          14/10/2020  Maize harvest
          14/10/2020  Maize end_crop
          12/05/2020  fertiliser apply amount = 101 (kg/ha), type = urea_N, depth = 60 (mm)
          12/05/2020  fertiliser apply amount = 288.57 (kg/ha), type = NH4NO3, depth = 60 (mm)
          14/05/2021  Maize sow plants = 8.4, sowing_depth = 38, cultivar = CC0001, row_spacing = 760.0, crop_class = plant
          30/09/2021  Maize harvest
          30/09/2021  Maize end_crop
          13/05/2021  fertiliser apply amount = 101 (kg/ha), type = urea_N, depth = 60 (mm)
          13/05/2021  fertiliser apply amount = 288.57 (kg/ha), type = NH4NO3, depth = 60 (mm)
        manager Reset: same as Generic.paddock.Manager folder.Reset
    area paddock2
      metfile met: filename=met00001.met
      Soil: Site=?
        Comment = ICASA Classification: Unknown  # Comments
        DataSource = GSDE
        Water
          Thickness  BD       AirDry     LL15      DUL       SAT
          45.0       1.20347  0.090499   0.180998  0.349598  0.440261
          46         1.27806  0.0798565  0.159713  0.336869  0.429134
          75         1.43     0.1094015  0.218803  0.374069  0.459633
          123        1.43     0.1094015  0.218803  0.374069  0.459633
          204        1.4      0.114855   0.22971   0.387069  0.471462
          336        1.45     0.099689   0.199378  0.361431  0.449171
          554        1.55606  0.0853825  0.170765  0.278485  0.401244
          SoilCrop Maize
            LL=[0.180998, 0.159713, 0.218803, 0.218803, 0.22971, 0.199378, 0.170765]
            KL=[0.08, 0.08, 0.08, 0.08, 0.08, 0.0647333, 0.0478]
            XF=[1, 1, 1, 1, 1, 1, 1]
          SoilCrop Soybean
            LL=[0.180998, 0.159713, 0.218803, 0.218803, 0.22971, 0.199378, 0.170765]
            KL=[0.08, 0.08, 0.08, 0.08, 0.08, 0.0647333, 0.0478]
            XF=[1, 1, 1, 1, 1, 1, 1]
        SoilWater: SummerCona=3.5; SummerU=6; SummerDate=1-Nov; WinterCona=3.5; WinterU=6; WinterDate=1-Apr; DiffusConst=40; DiffusSlope=16; Salb=0.1; CN2Bare=75; CNRed=20; CNCov=0.8; Thickness=[45, 46, 75, 123, 204, 336, 554]; SWCON=[0.4, 0.3, 0.3, 0.3, 0.3, 0.3, 0.3]
        SoilOrganicMatter: RootCN=45; RootWt=500; SoilCN=14.5; EnrACoeff=7.4; EnrBCoeff=0.2
          Thickness  OC        FBiom  FInert
          45.0       3.02021   0.04   0.4
          46         2.29286   0.035  0.4
          75         1.74898   0.03   0.410667
          123        1.74898   0.025  0.492667
          204        1.40867   0.02   0.628667
          336        0.600022  0.015  0.890833
          554        0.552696  0.01   0.95
        Analysis: Thickness=[45.0, 46, 75, 123, 204, 336, 554]
          PH=[5.90443, 5.54399, 5.08854, 5.08854, 6.11775, 5.45998, 7.18906]
        Sample Initial nitrogen
          Thickness  NO3       NH4
          45.0       3.02021   .1
          46         2.29286   .1
          75         1.74898   .1
          123        1.74898   .1
          204        1.40867   .1
          336        0.600022  .1
          554        0.552696  .1
          Date = 01/01/2018  # Sample date
        InitialWater: FractionFull=0.482304; PercentMethod=EvenlyDistributed; RelativeTo=ll15
      surfaceom SurfaceOrganicMatter
        PoolName = OrganicMatter  # Organic Matter pool name
        type = maize  # Organic Matter type
        mass = 2432.47  # Initial surface residue (kg/ha)
        cnr = 80.0  # C:N ratio of initial residue
        standing_fraction = 0  # Fraction of residue standing
      fertiliser
      Maize
        ini: filename=Maize.xml
      Soybean
        ini: filename=Soybean.xml
      folder Manager folder
        operations
          08/05/2018  Maize sow plants = 8.4, sowing_depth = 38, cultivar = CC0002, row_spacing = 760.0, crop_class = plant
          09/10/2018  Maize harvest
          09/10/2018  Maize end_crop
          08/05/2018  fertiliser apply amount = 101 (kg/ha), type = urea_N, depth = 60 (mm)
          08/05/2018  fertiliser apply amount = 288.57 (kg/ha), type = NH4NO3, depth = 60 (mm)
          08/05/2018  SurfaceOrganicMatter tillage type=disc, f_incorp=0, tillage_depth=50
          24/10/2018  SurfaceOrganicMatter tillage type=chisel, f_incorp=0, tillage_depth=150
          17/05/2019  Soybean sow plants = 34.6, sowing_depth = 38, cultivar = Asgrow_AG4403_4.0, row_spacing = 760.0, crop_class = plant
          09/10/2019  Soybean harvest
          09/10/2019  Soybean end_crop
          12/05/2020  Maize sow plants = 8.4, sowing_depth = 38, cultivar = CC0002, row_spacing = 760.0, crop_class = plant
          14/10/2020  Maize harvest
          14/10/2020  Maize end_crop
          12/05/2020  fertiliser apply amount = 101 (kg/ha), type = urea_N, depth = 60 (mm)
          12/05/2020  fertiliser apply amount = 288.57 (kg/ha), type = NH4NO3, depth = 60 (mm)
          14/05/2021  Maize sow plants = 8.4, sowing_depth = 38, cultivar = CC0002, row_spacing = 760.0, crop_class = plant
          30/09/2021  Maize harvest
          30/09/2021  Maize end_crop
          13/05/2021  fertiliser apply amount = 101 (kg/ha), type = urea_N, depth = 60 (mm)
          13/05/2021  fertiliser apply amount = 288.57 (kg/ha), type = NH4NO3, depth = 60 (mm)
        manager Reset: same as Generic.paddock.Manager folder.Reset
    area paddock3
      metfile met: filename=met00005.met
      Soil: Site=?
        Comment = ICASA Classification: Unknown  # Comments
        DataSource = GSDE
        Water
          Thickness  BD       AirDry     LL15      DUL       SAT
          45         1.37192  0.109942   0.219884  0.369967  0.456027
          46         1.49     0.084521   0.169042  0.342116  0.433974
          75         1.38     0.1223045  0.244609  0.395152  0.47804
          123        1.38     0.1223045  0.244609  0.395152  0.47804
          204        1.47     0.0919965  0.183993  0.354324  0.442906
          336        1.44     0.1055545  0.211109  0.366789  0.453432
          554        1.56     0.0857585  0.171517  0.295805  0.409822
          SoilCrop Maize
            LL=[0.219884, 0.169042, 0.244609, 0.244609, 0.183993, 0.211109, 0.171517]
            KL=[0.08, 0.08, 0.08, 0.08, 0.08, 0.0647333, 0.0478]
            XF=[1, 1, 1, 1, 1, 1, 1]
          SoilCrop Soybean: same as Generic.paddock3.Soil.Water.Maize
        SoilWater: SummerCona=3.5; SummerU=6; SummerDate=1-Nov; WinterCona=3.5; WinterU=6; WinterDate=1-Apr; DiffusConst=40; DiffusSlope=16; Salb=0.1; CN2Bare=75; CNRed=20; CNCov=0.8; Thickness=[45, 46, 75, 123, 204, 336, 554]; SWCON=[0.2, 0.3, 0.3, 0.3, 0.3, 0.3, 0.3]
        SoilOrganicMatter: RootCN=45; RootWt=500; SoilCN=14.5; EnrACoeff=7.4; EnrBCoeff=0.2
          Thickness  OC        FBiom  FInert
          45.0       3.51594   0.04   0.4
          46         2.84452   0.035  0.4
          75         2.13279   0.03   0.410667
          123        2.13279   0.025  0.492667
          204        1.13139   0.02   0.628667
          336        0.700106  0.015  0.890833
          554        0.475581  0.01   0.95
        Analysis: Thickness=[45.0, 46, 75, 123, 204, 336, 554]
          PH=[5.69496, 5.03846, 6.00011, 6.00011, 6.0138, 6.5679, 6.24102]
        Sample Initial nitrogen
          Thickness  NO3       NH4
          45.0       3.51594   .1
          46         2.84452   .1
          75         2.13279   .1
          123        2.13279   .1
          204        1.13139   .1
          336        0.700106  .1
          554        0.475581  .1
          Date = 01/01/2018  # Sample date
        InitialWater: FractionFull=0.125422; PercentMethod=EvenlyDistributed; RelativeTo=ll15
      surfaceom SurfaceOrganicMatter
        PoolName = OrganicMatter  # Organic Matter pool name
        type = maize  # Organic Matter type
        mass = 1126.05  # Initial surface residue (kg/ha)
        cnr = 80.0  # C:N ratio of initial residue
        standing_fraction = 0  # Fraction of residue standing
      fertiliser
      Maize
        ini: filename=Maize.xml
      Soybean
        ini: filename=Soybean.xml
      folder Manager folder
        operations
          08/05/2018  Maize sow plants = 8.4, sowing_depth = 38, cultivar = CC0003, row_spacing = 760.0, crop_class = plant
          09/10/2018  Maize harvest
          09/10/2018  Maize end_crop
          08/05/2018  fertiliser apply amount = 101 (kg/ha), type = urea_N, depth = 60 (mm)
          08/05/2018  fertiliser apply amount = 288.57 (kg/ha), type = NH4NO3, depth = 60 (mm)
          08/05/2018  SurfaceOrganicMatter tillage type=disc, f_incorp=0, tillage_depth=50
          24/10/2018  SurfaceOrganicMatter tillage type=chisel, f_incorp=0, tillage_depth=150
          17/05/2019  Soybean sow plants = 34.6, sowing_depth = 38, cultivar = Becks_367NRR_3.7, row_spacing = 760.0, crop_class = plant
          09/10/2019  Soybean harvest
          09/10/2019  Soybean end_crop
          12/05/2020  Maize sow plants = 8.4, sowing_depth = 38, cultivar = CC0003, row_spacing = 760.0, crop_class = plant
          14/10/2020  Maize harvest
          14/10/2020  Maize end_crop
          12/05/2020  fertiliser apply amount = 101 (kg/ha), type = urea_N, depth = 60 (mm)
          12/05/2020  fertiliser apply amount = 288.57 (kg/ha), type = NH4NO3, depth = 60 (mm)
          14/05/2021  Maize sow plants = 8.4, sowing_depth = 38, cultivar = CC0003, row_spacing = 760.0, crop_class = plant
          30/09/2021  Maize harvest
          30/09/2021  Maize end_crop
          13/05/2021  fertiliser apply amount = 101 (kg/ha), type = urea_N, depth = 60 (mm)
          13/05/2021  fertiliser apply amount = 288.57 (kg/ha), type = NH4NO3, depth = 60 (mm)
        manager Reset: same as Generic.paddock.Manager folder.Reset
    area paddock4
      metfile met: filename=met00009.met
      Soil: Site=?
        Comment = ICASA Classification: Unknown  # Comments
        DataSource = GSDE
        Water
          Thickness  BD       AirDry     LL15      DUL       SAT
          45         1.21604  0.1032535  0.206507  0.368719  0.456607
          46         1.41843  0.0806145  0.161229  0.334387  0.428155
          75         1.37565  0.089792   0.179584  0.353864  0.44191
          123        1.37565  0.089792   0.179584  0.353864  0.44191
          204        1.47     0.091023   0.182046  0.353315  0.442099
          336        1.44     0.112185   0.22437   0.369017  0.453409
          554        1.51     0.1015565  0.203113  0.332493  0.426979
          SoilCrop Maize
            LL=[0.206507, 0.161229, 0.179584, 0.179584, 0.182046, 0.22437, 0.203113]
            KL=[0.08, 0.08, 0.08, 0.08, 0.08, 0.0647333, 0.0478]
            XF=[1, 1, 1, 1, 1, 1, 1]
          SoilCrop Soybean: same as Generic.paddock4.Soil.Water.Maize
        SoilWater: SummerCona=3.5; SummerU=6; SummerDate=1-Nov; WinterCona=3.5; WinterU=6; WinterDate=1-Apr; DiffusConst=40; DiffusSlope=16; Salb=0.1; CN2Bare=75; CNRed=20; CNCov=0.8; Thickness=[45, 46, 75, 123, 204, 336, 554]; SWCON=[0.6, 0.3, 0.3, 0.3, 0.3, 0.3, 0.3]
        SoilOrganicMatter: RootCN=45; RootWt=500; SoilCN=14.5; EnrACoeff=7.4; EnrBCoeff=0.2
          Thickness  OC        FBiom  FInert
          45.0       5.7443    0.04   0.4
          46         1.72994   0.035  0.4
          75         1.33347   0.03   0.410667
          123        1.33347   0.025  0.492667
          204        1.48632   0.02   0.628667
          336        0.648386  0.015  0.890833
          554        0.50004   0.01   0.95
        Analysis: Thickness=[45.0, 46, 75, 123, 204, 336, 554]
          PH=[5.56199, 5.81747, 5.93979, 5.93979, 5.31583, 5.95145, 6.73551]
        Sample Initial nitrogen
          Thickness  NO3       NH4
          45.0       5.7443    .1
          46         1.72994   .1
          75         1.33347   .1
          123        1.33347   .1
          204        1.48632   .1
          336        0.648386  .1
          554        0.50004   .1
          Date = 01/01/2018  # Sample date
        InitialWater: FractionFull=0.199964; PercentMethod=EvenlyDistributed; RelativeTo=ll15
      surfaceom SurfaceOrganicMatter
        PoolName = OrganicMatter  # Organic Matter pool name
        type = maize  # Organic Matter type
        mass = 1076.8008  # Initial surface residue (kg/ha)
        cnr = 80.0  # C:N ratio of initial residue
        standing_fraction = 0  # Fraction of residue standing
      fertiliser
      Maize
        ini: filename=Maize.xml
      Soybean
        ini: filename=Soybean.xml
      folder Manager folder
        operations
          08/05/2018  Maize sow plants = 8.4, sowing_depth = 38, cultivar = CC0004, row_spacing = 760.0, crop_class = plant
          09/10/2018  Maize harvest
          09/10/2018  Maize end_crop
          08/05/2018  fertiliser apply amount = 101 (kg/ha), type = urea_N, depth = 60 (mm)
          08/05/2018  fertiliser apply amount = 288.57 (kg/ha), type = NH4NO3, depth = 60 (mm)
          08/05/2018  SurfaceOrganicMatter tillage type=disc, f_incorp=0, tillage_depth=50
          24/10/2018  SurfaceOrganicMatter tillage type=chisel, f_incorp=0, tillage_depth=150
          17/05/2019  Soybean sow plants = 34.6, sowing_depth = 38, cultivar = Dekalb4251_4.2, row_spacing = 760.0, crop_class = plant
          09/10/2019  Soybean harvest
          09/10/2019  Soybean end_crop
          12/05/2020  Maize sow plants = 8.4, sowing_depth = 38, cultivar = CC0004, row_spacing = 760.0, crop_class = plant
          14/10/2020  Maize harvest
          14/10/2020  Maize end_crop
          12/05/2020  fertiliser apply amount = 101 (kg/ha), type = urea_N, depth = 60 (mm)
          12/05/2020  fertiliser apply amount = 288.57 (kg/ha), type = NH4NO3, depth = 60 (mm)
          14/05/2021  Maize sow plants = 8.4, sowing_depth = 38, cultivar = CC0004, row_spacing = 760.0, crop_class = plant
          30/09/2021  Maize harvest
          30/09/2021  Maize end_crop
          13/05/2021  fertiliser apply amount = 101 (kg/ha), type = urea_N, depth = 60 (mm)
          13/05/2021  fertiliser apply amount = 288.57 (kg/ha), type = NH4NO3, depth = 60 (mm)
        manager Reset: same as Generic.paddock.Manager folder.Reset
    area paddock5
      metfile met: filename=met00009.met
      Soil: Site=?
        Comment = ICASA Classification: Unknown  # Comments
        DataSource = GSDE
        Water
          Thickness  BD       AirDry     LL15      DUL       SAT
          45.0       1.26322  0.09513    0.19026   0.340101  0.435449
          46         1.33807  0.088639   0.177278  0.34453   0.436555
          75         1.40058  0.0984505  0.196901  0.36895   0.454943
          123        1.40058  0.0984505  0.196901  0.36895   0.454943
          204        1.38     0.1132395  0.226479  0.391965  0.476779
          336        1.45     0.1018425  0.203685  0.36398   0.451223
          554        1.56     0.091036   0.182072  0.300231  0.410477
          SoilCrop Maize
            LL=[0.19026, 0.177278, 0.196901, 0.196901, 0.226479, 0.203685, 0.182072]
            KL=[0.08, 0.08, 0.08, 0.08, 0.08, 0.0647333, 0.0478]
            XF=[1, 1, 1, 1, 1, 1, 1]
          SoilCrop Soybean
            LL=[0.19026, 0.177278, 0.196901, 0.196901, 0.226479, 0.203685, 0.182072]
            KL=[0.08, 0.08, 0.08, 0.08, 0.08, 0.0647333, 0.0478]
            XF=[1, 1, 1, 1, 1, 1, 1]
        SoilWater: SummerCona=3.5; SummerU=6; SummerDate=1-Nov; WinterCona=3.5; WinterU=6; WinterDate=1-Apr; DiffusConst=40; DiffusSlope=16; Salb=0.1; CN2Bare=75; CNRed=20; CNCov=0.8; Thickness=[45, 46, 75, 123, 204, 336, 554]; SWCON=[0.48, 0.3, 0.3, 0.3, 0.3, 0.3, 0.3]
        SoilOrganicMatter: RootCN=45; RootWt=500; SoilCN=14.5; EnrACoeff=7.4; EnrBCoeff=0.2
          Thickness  OC        FBiom  FInert
          45.0       4.90377   0.04   0.4
          46         2.35002   0.035  0.4
          75         2.28406   0.03   0.410667
          123        2.28406   0.025  0.492667
          204        0.962734  0.02   0.628667
          336        0.4964    0.015  0.890833
          554        0.540428  0.01   0.95
        Analysis: Thickness=[45.0, 46, 75, 123, 204, 336, 554]
          PH=[5.9768, 5.86461, 5.90998, 5.90998, 5.66004, 6.13217, 6.75094]
        Sample Initial nitrogen
          Thickness  NO3       NH4
          45.0       4.90377   .1
          46         2.35002   .1
          75         2.28406   .1
          123        2.28406   .1
          204        0.962734  .1
          336        0.4964    .1
          554        0.540428  .1
          Date = 01/01/2018  # Sample date
        InitialWater: FractionFull=0.117318; PercentMethod=EvenlyDistributed; RelativeTo=ll15
      surfaceom SurfaceOrganicMatter
        PoolName = OrganicMatter  # Organic Matter pool name
        type = maize  # Organic Matter type
        mass = 1016.8962  # Initial surface residue (kg/ha)
        cnr = 80.0  # C:N ratio of initial residue
        standing_fraction = 0  # Fraction of residue standing
      fertiliser
      Maize
        ini: filename=Maize.xml
      Soybean
        ini: filename=Soybean.xml
      folder Manager folder
        operations
          08/05/2018  Maize sow plants = 8.4, sowing_depth = 38, cultivar = CC0005, row_spacing = 760.0, crop_class = plant
          09/10/2018  Maize harvest
          09/10/2018  Maize end_crop
          08/05/2018  fertiliser apply amount = 101 (kg/ha), type = urea_N, depth = 60 (mm)
          08/05/2018  fertiliser apply amount = 288.57 (kg/ha), type = NH4NO3, depth = 60 (mm)
          08/05/2018  SurfaceOrganicMatter tillage type=disc, f_incorp=0, tillage_depth=50
          24/10/2018  SurfaceOrganicMatter tillage type=chisel, f_incorp=0, tillage_depth=150
          17/05/2019  Soybean sow plants = 34.6, sowing_depth = 38, cultivar = U98307162_3.6, row_spacing = 760.0, crop_class = plant
          09/10/2019  Soybean harvest
          09/10/2019  Soybean end_crop
          12/05/2020  Maize sow plants = 8.4, sowing_depth = 38, cultivar = CC0005, row_spacing = 760.0, crop_class = plant
          14/10/2020  Maize harvest
          14/10/2020  Maize end_crop
          12/05/2020  fertiliser apply amount = 101 (kg/ha), type = urea_N, depth = 60 (mm)
          12/05/2020  fertiliser apply amount = 288.57 (kg/ha), type = NH4NO3, depth = 60 (mm)
          14/05/2021  Maize sow plants = 8.4, sowing_depth = 38, cultivar = CC0005, row_spacing = 760.0, crop_class = plant
          30/09/2021  Maize harvest
          30/09/2021  Maize end_crop
          13/05/2021  fertiliser apply amount = 101 (kg/ha), type = urea_N, depth = 60 (mm)
          13/05/2021  fertiliser apply amount = 288.57 (kg/ha), type = NH4NO3, depth = 60 (mm)
        manager Reset: same as Generic.paddock.Manager folder.Reset
      manager derived variables
        on start_of_day:
```
T_average = (maxt + mint) * 0.5 
soil_co2 = dlt_biom_c_atm() + dlt_fom_c_atm() + dlt_hum_c_atm() + dlt_res_c_atm
```
    area paddock6
      metfile met: filename=met00009.met
      Soil: Site=?
        Comment = ICASA Classification: Unknown  # Comments
        DataSource = GSDE
        Water
          Thickness  BD       AirDry     LL15      DUL       SAT
          45.0       1.32635  0.0758145  0.151629  0.325316  0.422892
          46         1.43368  0.088573   0.177146  0.348885  0.439162
          75         1.51     0.088771   0.177542  0.333253  0.429961
          123        1.51     0.088771   0.177542  0.333253  0.429961
          204        1.44     0.104337   0.208674  0.367262  0.45404
          336        1.46     0.104212   0.208424  0.359424  0.447441
          554        1.55     0.086583   0.173166  0.303417  0.413543
          SoilCrop Maize
            LL=[0.151629, 0.177146, 0.177542, 0.177542, 0.208674, 0.208424, 0.173166]
            KL=[0.08, 0.08, 0.08, 0.08, 0.08, 0.0647333, 0.0478]
            XF=[1, 1, 1, 1, 1, 1, 1]
          SoilCrop Soybean
            LL=[0.151629, 0.177146, 0.177542, 0.177542, 0.208674, 0.208424, 0.173166]
            KL=[0.08, 0.08, 0.08, 0.08, 0.08, 0.0647333, 0.0478]
            XF=[1, 1, 1, 1, 1, 1, 1]
        SoilWater: SummerCona=3.5; SummerU=6; SummerDate=1-Nov; WinterCona=3.5; WinterU=6; WinterDate=1-Apr; DiffusConst=40; DiffusSlope=16; Salb=0.1; CN2Bare=75; CNRed=20; CNCov=0.8; Thickness=[45, 46, 75, 123, 204, 336, 554]; SWCON=[0.54, 0.3, 0.3, 0.3, 0.3, 0.3, 0.3]
        SoilOrganicMatter: RootCN=45; RootWt=500; SoilCN=14.5; EnrACoeff=7.4; EnrBCoeff=0.2
          Thickness  OC        FBiom  FInert
          45.0       3.86821   0.04   0.4
          46         2.86439   0.035  0.4
          75         1.4525    0.03   0.410667
          123        1.4525    0.025  0.492667
          204        1.11204   0.02   0.628667
          336        0.619915  0.015  0.890833
          554        0.361387  0.01   0.95
        Analysis: Thickness=[45.0, 46, 75, 123, 204, 336, 554]
          PH=[5.11301, 5.7702, 6.04636, 6.04636, 5.33552, 6.10063, 6.83806]
        Sample Initial nitrogen
          Thickness  NO3       NH4
          45.0       3.86821   .1
          46         2.86439   .1
          75         1.4525    .1
          123        1.4525    .1
          204        1.11204   .1
          336        0.619915  .1
          554        0.361387  .1
          Date = 01/01/2018  # Sample date
        InitialWater: FractionFull=0.237805; PercentMethod=EvenlyDistributed; RelativeTo=ll15
      surfaceom SurfaceOrganicMatter
        PoolName = OrganicMatter  # Organic Matter pool name
        type = maize  # Organic Matter type
        mass = 1091.05  # Initial surface residue (kg/ha)
        cnr = 80.0  # C:N ratio of initial residue
        standing_fraction = 0  # Fraction of residue standing
      fertiliser
      Maize
        ini: filename=Maize.xml
      Soybean
        ini: filename=Soybean.xml
      folder Manager folder
        operations
          08/05/2018  Maize sow plants = 8.4, sowing_depth = 38, cultivar = CC0006, row_spacing = 760.0, crop_class = plant
          09/10/2018  Maize harvest
          09/10/2018  Maize end_crop
          08/05/2018  fertiliser apply amount = 101 (kg/ha), type = urea_N, depth = 60 (mm)
          08/05/2018  fertiliser apply amount = 288.57 (kg/ha), type = NH4NO3, depth = 60 (mm)
          08/05/2018  SurfaceOrganicMatter tillage type=disc, f_incorp=0, tillage_depth=50
          24/10/2018  SurfaceOrganicMatter tillage type=chisel, f_incorp=0, tillage_depth=150
          17/05/2019  Soybean sow plants = 34.6, sowing_depth = 38, cultivar = Nebraska_3.5, row_spacing = 760.0, crop_class = plant
          09/10/2019  Soybean harvest
          09/10/2019  Soybean end_crop
          12/05/2020  Maize sow plants = 8.4, sowing_depth = 38, cultivar = CC0006, row_spacing = 760.0, crop_class = plant
          14/10/2020  Maize harvest
          14/10/2020  Maize end_crop
          12/05/2020  fertiliser apply amount = 101 (kg/ha), type = urea_N, depth = 60 (mm)
          12/05/2020  fertiliser apply amount = 288.57 (kg/ha), type = NH4NO3, depth = 60 (mm)
          14/05/2021  Maize sow plants = 8.4, sowing_depth = 38, cultivar = CC0006, row_spacing = 760.0, crop_class = plant
          30/09/2021  Maize harvest
          30/09/2021  Maize end_crop
          13/05/2021  fertiliser apply amount = 101 (kg/ha), type = urea_N, depth = 60 (mm)
          13/05/2021  fertiliser apply amount = 288.57 (kg/ha), type = NH4NO3, depth = 60 (mm)
        manager Reset: same as Generic.paddock.Manager folder.Reset
      manager derived variables
        on start_of_day:
        script: same as in Generic.paddock5.derived variables
    area paddock7
      metfile met: filename=met00008.met
      Soil: Site=?
        Comment = ICASA Classification: Unknown  # Comments
        DataSource = GSDE
        Water: same as Generic.paddock6.Soil.Water
        SoilWater: SummerCona=3.5; SummerU=6; SummerDate=1-Nov; WinterCona=3.5; WinterU=6; WinterDate=1-Apr; DiffusConst=40; DiffusSlope=16; Salb=0.1; CN2Bare=75; CNRed=20; CNCov=0.8; Thickness=[45, 46, 75, 123, 204, 336, 554]; SWCON=[0.69, 0.3, 0.3, 0.3, 0.3, 0.3, 0.3]
        SoilOrganicMatter: same as Generic.paddock6.Soil.SoilOrganicMatter
        Analysis: Thickness=[45.0, 46, 75, 123, 204, 336, 554]
          PH=[5.11301, 5.7702, 6.04636, 6.04636, 5.33552, 6.10063, 6.83806]
        Sample Initial nitrogen
          Thickness  NO3       NH4
          45.0       3.86821   .1
          46         2.86439   .1
          75         1.4525    .1
          123        1.4525    .1
          204        1.11204   .1
          336        0.619915  .1
          554        0.361387  .1
          Date = 01/01/2018  # Sample date
        InitialWater: FractionFull=0.556114; PercentMethod=EvenlyDistributed; RelativeTo=ll15
      surfaceom SurfaceOrganicMatter
        PoolName = OrganicMatter  # Organic Matter pool name
        type = maize  # Organic Matter type
        mass = 1566.45  # Initial surface residue (kg/ha)
        cnr = 80.0  # C:N ratio of initial residue
        standing_fraction = 0  # Fraction of residue standing
      fertiliser
      Maize
        ini: filename=Maize.xml
      Soybean
        ini: filename=Soybean.xml
      folder Manager folder
        operations
          08/05/2018  Maize sow plants = 8.4, sowing_depth = 38, cultivar = CC0007, row_spacing = 760.0, crop_class = plant
          09/10/2018  Maize harvest
          09/10/2018  Maize end_crop
          08/05/2018  fertiliser apply amount = 101 (kg/ha), type = urea_N, depth = 60 (mm)
          08/05/2018  fertiliser apply amount = 288.57 (kg/ha), type = NH4NO3, depth = 60 (mm)
          08/05/2018  SurfaceOrganicMatter tillage type=disc, f_incorp=0, tillage_depth=50
          24/10/2018  SurfaceOrganicMatter tillage type=chisel, f_incorp=0, tillage_depth=150
          17/05/2019  Soybean sow plants = 34.6, sowing_depth = 38, cultivar = Pioneer_94B01_4.0, row_spacing = 760.0, crop_class = plant
          09/10/2019  Soybean harvest
          09/10/2019  Soybean end_crop
          12/05/2020  Maize sow plants = 8.4, sowing_depth = 38, cultivar = CC0007, row_spacing = 760.0, crop_class = plant
          14/10/2020  Maize harvest
          14/10/2020  Maize end_crop
          12/05/2020  fertiliser apply amount = 101 (kg/ha), type = urea_N, depth = 60 (mm)
          12/05/2020  fertiliser apply amount = 288.57 (kg/ha), type = NH4NO3, depth = 60 (mm)
          14/05/2021  Maize sow plants = 8.4, sowing_depth = 38, cultivar = CC0007, row_spacing = 760.0, crop_class = plant
          30/09/2021  Maize harvest
          30/09/2021  Maize end_crop
          13/05/2021  fertiliser apply amount = 101 (kg/ha), type = urea_N, depth = 60 (mm)
          13/05/2021  fertiliser apply amount = 288.57 (kg/ha), type = NH4NO3, depth = 60 (mm)
        manager Reset: same as Generic.paddock.Manager folder.Reset
      manager derived variables
        on start_of_day:
        script: same as in Generic.paddock5.derived variables
    area paddock8
      metfile met: filename=met00009.met
      Soil: Site=?
        Comment = ICASA Classification: Unknown  # Comments
        DataSource = GSDE
        Water
          Thickness  BD       AirDry     LL15      DUL       SAT
          45.0       1.27123  0.0918885  0.183777  0.354748  0.444147
          46         1.38287  0.087175   0.17435   0.351545  0.440258
          75         1.48523  0.0864695  0.172939  0.343007  0.43489
          123        1.48523  0.0864695  0.172939  0.343007  0.43489
          204        1.49416  0.084313   0.168626  0.346936  0.435612
          336        1.44     0.1071575  0.214315  0.367956  0.454253
          554        1.57     0.077742   0.155484  0.285493  0.406131
          SoilCrop Maize
            LL=[0.183777, 0.17435, 0.172939, 0.172939, 0.168626, 0.214315, 0.155484]
            KL=[0.08, 0.08, 0.08, 0.08, 0.08, 0.0647333, 0.0478]
            XF=[1, 1, 1, 1, 1, 1, 1]
          SoilCrop Soybean
            LL=[0.183777, 0.17435, 0.172939, 0.172939, 0.168626, 0.214315, 0.155484]
            KL=[0.08, 0.08, 0.08, 0.08, 0.08, 0.0647333, 0.0478]
            XF=[1, 1, 1, 1, 1, 1, 1]
        SoilWater: SummerCona=3.5; SummerU=6; SummerDate=1-Nov; WinterCona=3.5; WinterU=6; WinterDate=1-Apr; DiffusConst=40; DiffusSlope=16; Salb=0.1; CN2Bare=75; CNRed=20; CNCov=0.8; Thickness=[45, 46, 75, 123, 204, 336, 554]; SWCON=[0.67, 0.3, 0.3, 0.3, 0.3, 0.3, 0.3]
        SoilOrganicMatter: RootCN=45; RootWt=500; SoilCN=14.5; EnrACoeff=7.4; EnrBCoeff=0.2
          Thickness  OC        FBiom  FInert
          45.0       4.06446   0.04   0.4
          46         3.37196   0.035  0.4
          75         2.02852   0.03   0.410667
          123        2.02852   0.025  0.492667
          204        1.00607   0.02   0.628667
          336        0.892809  0.015  0.890833
          554        0.588888  0.01   0.95
        Analysis: Thickness=[45.0, 46, 75, 123, 204, 336, 554]
          PH=[5.64235, 5.21515, 5.78956, 5.78956, 6.43573, 5.8729, 6.75812]
        Sample Initial nitrogen
          Thickness  NO3       NH4
          45.0       4.06446   .1
          46         3.37196   .1
          75         2.02852   .1
          123        2.02852   .1
          204        1.00607   .1
          336        0.892809  .1
          554        0.588888  .1
          Date = 01/01/2018  # Sample date
        InitialWater: FractionFull=0.550968; PercentMethod=EvenlyDistributed; RelativeTo=ll15
      surfaceom SurfaceOrganicMatter
        PoolName = OrganicMatter  # Organic Matter pool name
        type = maize  # Organic Matter type
        mass = 1803.39  # Initial surface residue (kg/ha)
        cnr = 80.0  # C:N ratio of initial residue
        standing_fraction = 0  # Fraction of residue standing
      fertiliser
      Maize
        ini: filename=Maize.xml
      Soybean
        ini: filename=Soybean.xml
      folder Manager folder
        operations
          08/05/2018  Maize sow plants = 8.4, sowing_depth = 38, cultivar = CC0008, row_spacing = 760.0, crop_class = plant
          09/10/2018  Maize harvest
          09/10/2018  Maize end_crop
          08/05/2018  fertiliser apply amount = 101 (kg/ha), type = urea_N, depth = 60 (mm)
          08/05/2018  fertiliser apply amount = 288.57 (kg/ha), type = NH4NO3, depth = 60 (mm)
          08/05/2018  SurfaceOrganicMatter tillage type=disc, f_incorp=0, tillage_depth=50
          24/10/2018  SurfaceOrganicMatter tillage type=chisel, f_incorp=0, tillage_depth=150
          17/05/2019  Soybean sow plants = 34.6, sowing_depth = 38, cultivar = Mississippi_4.4, row_spacing = 760.0, crop_class = plant
          09/10/2019  Soybean harvest
          09/10/2019  Soybean end_crop
          12/05/2020  Maize sow plants = 8.4, sowing_depth = 38, cultivar = CC0008, row_spacing = 760.0, crop_class = plant
          14/10/2020  Maize harvest
          14/10/2020  Maize end_crop
          12/05/2020  fertiliser apply amount = 101 (kg/ha), type = urea_N, depth = 60 (mm)
          12/05/2020  fertiliser apply amount = 288.57 (kg/ha), type = NH4NO3, depth = 60 (mm)
          14/05/2021  Maize sow plants = 8.4, sowing_depth = 38, cultivar = CC0008, row_spacing = 760.0, crop_class = plant
          30/09/2021  Maize harvest
          30/09/2021  Maize end_crop
          13/05/2021  fertiliser apply amount = 101 (kg/ha), type = urea_N, depth = 60 (mm)
          13/05/2021  fertiliser apply amount = 288.57 (kg/ha), type = NH4NO3, depth = 60 (mm)
        manager Reset: same as Generic.paddock.Manager folder.Reset
      manager derived variables
        on start_of_day:
        script: same as in Generic.paddock5.derived variables
    area paddock9
      metfile met: filename=met00000.met
      Soil: Site=?
        Comment = ICASA Classification: Unknown  # Comments
        DataSource = GSDE
        Water
          Thickness  BD       AirDry     LL15      DUL       SAT
          45.0       1.27067  0.0941635  0.188327  0.362964  0.446679
          46         1.43244  0.08316    0.16632   0.357503  0.43543
          75         1.39854  0.08106    0.16212   0.367059  0.428017
          123        1.39854  0.08106    0.16212   0.367059  0.428017
          204        1.45     0.098243   0.196486  0.386197  0.452261
          336        1.4      0.1159265  0.231853  0.388759  0.468277
          554        1.57     0.076493   0.152986  0.302523  0.407462
          SoilCrop Maize
            LL=[0.188327, 0.16632, 0.16212, 0.16212, 0.196486, 0.231853, 0.152986]
            KL=[0.08, 0.08, 0.08, 0.08, 0.08, 0.0647333, 0.0478]
            XF=[1, 1, 1, 1, 1, 1, 1]
          SoilCrop Soybean
            LL=[0.188327, 0.16632, 0.16212, 0.16212, 0.196486, 0.231853, 0.152986]
            KL=[0.08, 0.08, 0.08, 0.08, 0.08, 0.0647333, 0.0478]
            XF=[1, 1, 1, 1, 1, 1, 1]
        SoilWater: SummerCona=3.5; SummerU=6; SummerDate=1-Nov; WinterCona=3.5; WinterU=6; WinterDate=1-Apr; DiffusConst=40; DiffusSlope=16; Salb=0.1; CN2Bare=75; CNRed=20; CNCov=0.8; Thickness=[45, 46, 75, 123, 204, 336, 554]; SWCON=[0.41, 0.3, 0.3, 0.3, 0.3, 0.3, 0.3]
        SoilOrganicMatter: RootCN=45; RootWt=500; SoilCN=14.5; EnrACoeff=7.4; EnrBCoeff=0.2
          Thickness  OC        FBiom  FInert
          45.0       3.7056    0.04   0.4
          46         2.40472   0.035  0.4
          75         1.11632   0.03   0.410667
          123        1.11632   0.025  0.492667
          204        1.07837   0.02   0.628667
          336        0.660172  0.015  0.890833
          554        0.351273  0.01   0.95
        Analysis: Thickness=[45.0, 46, 75, 123, 204, 336, 554]
          PH=[5.51496, 5.68051, 5.54918, 5.54918, 6.24153, 5.94416, 6.76411]
        Sample Initial nitrogen
          Thickness  NO3       NH4
          45.0       3.7056    .1
          46         2.40472   .1
          75         1.11632   .1
          123        1.11632   .1
          204        1.07837   .1
          336        0.660172  .1
          554        0.351273  .1
          Date = 01/01/2018  # Sample date
        InitialWater: FractionFull=0.285845; PercentMethod=EvenlyDistributed; RelativeTo=ll15
      surfaceom SurfaceOrganicMatter
        PoolName = OrganicMatter  # Organic Matter pool name
        type = maize  # Organic Matter type
        mass = 657.143  # Initial surface residue (kg/ha)
        cnr = 80.0  # C:N ratio of initial residue
        standing_fraction = 0  # Fraction of residue standing
      fertiliser
      Maize
        ini: filename=Maize.xml
      Soybean
        ini: filename=Soybean.xml
      folder Manager folder
        operations
          08/05/2018  Maize sow plants = 8.4, sowing_depth = 38, cultivar = CC0009, row_spacing = 760.0, crop_class = plant
          09/10/2018  Maize harvest
          09/10/2018  Maize end_crop
          08/05/2018  fertiliser apply amount = 101 (kg/ha), type = urea_N, depth = 60 (mm)
          08/05/2018  fertiliser apply amount = 288.57 (kg/ha), type = NH4NO3, depth = 60 (mm)
          08/05/2018  SurfaceOrganicMatter tillage type=disc, f_incorp=0, tillage_depth=50
          24/10/2018  SurfaceOrganicMatter tillage type=chisel, f_incorp=0, tillage_depth=150
          17/05/2019  Soybean sow plants = 34.6, sowing_depth = 38, cultivar = Mississippi_4.4, row_spacing = 760.0, crop_class = plant
          09/10/2019  Soybean harvest
          09/10/2019  Soybean end_crop
          12/05/2020  Maize sow plants = 8.4, sowing_depth = 38, cultivar = CC0009, row_spacing = 760.0, crop_class = plant
          14/10/2020  Maize harvest
          14/10/2020  Maize end_crop
          12/05/2020  fertiliser apply amount = 101 (kg/ha), type = urea_N, depth = 60 (mm)
          12/05/2020  fertiliser apply amount = 288.57 (kg/ha), type = NH4NO3, depth = 60 (mm)
          14/05/2021  Maize sow plants = 8.4, sowing_depth = 38, cultivar = CC0009, row_spacing = 760.0, crop_class = plant
          30/09/2021  Maize harvest
          30/09/2021  Maize end_crop
          13/05/2021  fertiliser apply amount = 101 (kg/ha), type = urea_N, depth = 60 (mm)
          13/05/2021  fertiliser apply amount = 288.57 (kg/ha), type = NH4NO3, depth = 60 (mm)
        manager Reset: same as Generic.paddock.Manager folder.Reset
      manager derived variables
        on start_of_day:
        script: same as in Generic.paddock5.derived variables
    area paddock10
      metfile met: filename=met00008.met
      Soil: Site=?
        Comment = ICASA Classification: Unknown  # Comments
        DataSource = GSDE
        Water
          Thickness  BD       AirDry     LL15      DUL       SAT
          45         1.32511  0.0947525  0.189505  0.356469  0.44596
          46         1.39553  0.0893835  0.178767  0.355687  0.44294
          75         1.47     0.0923845  0.184769  0.351599  0.441712
          123        1.47     0.0923845  0.184769  0.351599  0.441712
          204        1.41     0.110223   0.220446  0.382755  0.467624
          336        1.5      0.0890725  0.178145  0.338033  0.432503
          554        1.58     0.0770825  0.154165  0.27418   0.401644
          SoilCrop Maize
            LL=[0.189505, 0.178767, 0.184769, 0.184769, 0.220446, 0.178145, 0.154165]
            KL=[0.08, 0.08, 0.08, 0.08, 0.08, 0.0647333, 0.0478]
            XF=[1, 1, 1, 1, 1, 1, 1]
          SoilCrop Soybean: same as Generic.paddock10.Soil.Water.Maize
        SoilWater: SummerCona=3.5; SummerU=6; SummerDate=1-Nov; WinterCona=3.5; WinterU=6; WinterDate=1-Apr; DiffusConst=40; DiffusSlope=16; Salb=0.1; CN2Bare=75; CNRed=20; CNCov=0.8; Thickness=[45, 46, 75, 123, 204, 336, 554]; SWCON=[0.22, 0.3, 0.3, 0.3, 0.3, 0.3, 0.3]
        SoilOrganicMatter: RootCN=45; RootWt=500; SoilCN=14.5; EnrACoeff=7.4; EnrBCoeff=0.2
          Thickness  OC        FBiom  FInert
          45.0       3.92151   0.04   0.4
          46         1.75089   0.035  0.4
          75         2.20155   0.03   0.410667
          123        2.20155   0.025  0.492667
          204        1.04189   0.02   0.628667
          336        0.857557  0.015  0.890833
          554        0.49799   0.01   0.95
        Analysis: Thickness=[45.0, 46, 75, 123, 204, 336, 554]
          PH=[5.69301, 6.36132, 5.30448, 5.30448, 5.91032, 6.50191, 6.08273]
        Sample Initial nitrogen
          Thickness  NO3       NH4
          45.0       3.92151   .1
          46         1.75089   .1
          75         2.20155   .1
          123        2.20155   .1
          204        1.04189   .1
          336        0.857557  .1
          554        0.49799   .1
          Date = 01/01/2018  # Sample date
        InitialWater: FractionFull=0.207906; PercentMethod=EvenlyDistributed; RelativeTo=ll15
      surfaceom SurfaceOrganicMatter
        PoolName = OrganicMatter  # Organic Matter pool name
        type = maize  # Organic Matter type
        mass = 300.19  # Initial surface residue (kg/ha)
        cnr = 80.0  # C:N ratio of initial residue
        standing_fraction = 0  # Fraction of residue standing
      fertiliser
      Maize
        ini: filename=Maize.xml
      Soybean
        ini: filename=Soybean.xml
      folder Manager folder
        operations
          08/05/2018  Maize sow plants = 8.4, sowing_depth = 38, cultivar = CC0010, row_spacing = 760.0, crop_class = plant
          09/10/2018  Maize harvest
          09/10/2018  Maize end_crop
          08/05/2018  fertiliser apply amount = 101 (kg/ha), type = urea_N, depth = 60 (mm)
          08/05/2018  fertiliser apply amount = 288.57 (kg/ha), type = NH4NO3, depth = 60 (mm)
          08/05/2018  SurfaceOrganicMatter tillage type=disc, f_incorp=0, tillage_depth=50
          24/10/2018  SurfaceOrganicMatter tillage type=chisel, f_incorp=0, tillage_depth=150
          17/05/2019  Soybean sow plants = 34.6, sowing_depth = 38, cultivar = U98307162_3.6, row_spacing = 760.0, crop_class = plant
          09/10/2019  Soybean harvest
          09/10/2019  Soybean end_crop
          12/05/2020  Maize sow plants = 8.4, sowing_depth = 38, cultivar = CC0010, row_spacing = 760.0, crop_class = plant
          14/10/2020  Maize harvest
          14/10/2020  Maize end_crop
          12/05/2020  fertiliser apply amount = 101 (kg/ha), type = urea_N, depth = 60 (mm)
          12/05/2020  fertiliser apply amount = 288.57 (kg/ha), type = NH4NO3, depth = 60 (mm)
          14/05/2021  Maize sow plants = 8.4, sowing_depth = 38, cultivar = CC0010, row_spacing = 760.0, crop_class = plant
          30/09/2021  Maize harvest
          30/09/2021  Maize end_crop
          13/05/2021  fertiliser apply amount = 101 (kg/ha), type = urea_N, depth = 60 (mm)
          13/05/2021  fertiliser apply amount = 288.57 (kg/ha), type = NH4NO3, depth = 60 (mm)
        manager Reset: same as Generic.paddock.Manager folder.Reset
      manager derived variables
        on start_of_day:
        script: same as in Generic.paddock5.derived variables
    area paddock11
      metfile met: filename=met00007.met
      Soil: Site=?
        Comment = ICASA Classification: Unknown  # Comments
        DataSource = GSDE
        Water
          Thickness  BD       AirDry     LL15      DUL       SAT
          45.0       1.23624  0.080086   0.160172  0.338905  0.430596
          46         1.55533  0.0867955  0.173591  0.343329  0.435115
          75         1.48329  0.093506   0.187012  0.356987  0.44522
          123        1.48329  0.093506   0.187012  0.356987  0.44522
          204        1.49458  0.1150795  0.230159  0.389582  0.474118
          336        1.50774  0.101477   0.202954  0.360617  0.448655
          554        1.67132  0.084244   0.168488  0.299406  0.41184
          SoilCrop Maize
            LL=[0.160172, 0.173591, 0.187012, 0.187012, 0.230159, 0.202954, 0.168488]
            KL=[0.08, 0.08, 0.08, 0.08, 0.08, 0.0647333, 0.0478]
            XF=[1, 1, 1, 1, 1, 1, 1]
          SoilCrop Soybean
            LL=[0.160172, 0.173591, 0.187012, 0.187012, 0.230159, 0.202954, 0.168488]
            KL=[0.08, 0.08, 0.08, 0.08, 0.08, 0.0647333, 0.0478]
            XF=[1, 1, 1, 1, 1, 1, 1]
        SoilWater: same as Generic.paddock1.Soil.SoilWater
        SoilOrganicMatter: RootCN=45; RootWt=500; SoilCN=14.5; EnrACoeff=7.4; EnrBCoeff=0.2
          Thickness  OC        FBiom  FInert
          45.0       3.37794   0.04   0.4
          46         1.85171   0.035  0.4
          75         1.68744   0.03   0.410667
          123        1.68744   0.025  0.492667
          204        1.24905   0.02   0.628667
          336        0.632088  0.015  0.890833
          554        0.329393  0.01   0.95
        Analysis: Thickness=[45.0, 46, 75, 123, 204, 336, 554]
          PH=[5.11605, 5.57567, 5.96775, 5.96775, 5.11541, 5.86435, 6.51661]
        Sample Initial nitrogen
          Thickness  NO3       NH4
          45.0       3.37794   .1
          46         1.85171   .1
          75         1.68744   .1
          123        1.68744   .1
          204        1.24905   .1
          336        0.632088  .1
          554        0.329393  .1
          Date = 01/01/2018  # Sample date
        InitialWater: FractionFull=0.521122; PercentMethod=EvenlyDistributed; RelativeTo=ll15
      surfaceom SurfaceOrganicMatter
        PoolName = OrganicMatter  # Organic Matter pool name
        type = maize  # Organic Matter type
        mass = 2048.02  # Initial surface residue (kg/ha)
        cnr = 80.0  # C:N ratio of initial residue
        standing_fraction = 0  # Fraction of residue standing
      fertiliser
      Maize
        ini: filename=Maize.xml
      Soybean
        ini: filename=Soybean.xml
      folder Manager folder
        operations
          08/05/2018  Maize sow plants = 8.4, sowing_depth = 38, cultivar = CC0011, row_spacing = 762.0, crop_class = plant
          09/10/2018  Maize harvest
          09/10/2018  Maize end_crop
          08/05/2018  fertiliser apply amount = 101 (kg/ha), type = urea_N, depth = 60 (mm)
          08/05/2018  fertiliser apply amount = 288.57 (kg/ha), type = NH4NO3, depth = 60 (mm)
          08/05/2018  SurfaceOrganicMatter tillage type=disc, f_incorp=0, tillage_depth=50
          24/10/2018  SurfaceOrganicMatter tillage type=chisel, f_incorp=0, tillage_depth=150
          17/05/2019  Soybean sow plants = 34.6, sowing_depth = 38, cultivar = Mississippi_3.9, row_spacing = 7620.0, crop_class = plant
          09/10/2019  Soybean harvest
          09/10/2019  Soybean end_crop
        manager Reset
          # When should a reset be done
          reset_date = 1-jan  # Enter date of reset (dd-mmm)
          # Reset details
          soilmodule = Soil  # Name of your soil module
          surfaceommodule = SurfaceOrganicMatter  # Name of your surface organic matter module
          resetWater = no  # Reset soil water?
          resetNitrogen = no  # Reset soil nitrogen?
          resetSurfaceOM = no  # Reset surface organic matter?
          on start_of_day:
          script: same as in Generic.paddock.Manager folder.Reset
      manager derived variables
        on start_of_day:
        script: same as in Generic.paddock5.derived variables
      tracker
        variable:
          sum of radn on end_of_day from sowing to harvesting as RadiationIn
          sum of n2o_atm() on end_of_day as N2OemissionIn
          sum of n2o_atm() on end_of_day from reported to now as N2Oemission_year
          sum of soil_co2 on end_of_day as CO2emissionIn
          sum of soil_co2 on end_of_day from reported to now as CO2emission_year
          average of T_average on end_of_day from sowing to harvesting as TempIn
          average of T_average on end_of_day from reported to now as Temp_year
          sum of rain on end_of_day from sowing to harvesting as RainIn
          sum of rain on end_of_day from reported to now as Rain_year
          sum of radn on end_of_day from reported to now as Radiation_year
    area paddock12
      metfile met: filename=met00004.met
      Soil: Site=?
        Comment = ICASA Classification: Unknown  # Comments
        DataSource = GSDE
        Water
          Thickness  BD       AirDry     LL15      DUL       SAT
          45.0       1.26322  0.09513    0.19026   0.340101  0.435449
          46         1.33807  0.088639   0.177278  0.34453   0.436555
          75         1.40058  0.0984505  0.196901  0.36895   0.454943
          123        1.40058  0.0984505  0.196901  0.36895   0.454943
          204        1.51893  0.1132395  0.226479  0.391965  0.476779
          336        1.60888  0.1018425  0.203685  0.36398   0.451223
          554        1.6757   0.091036   0.182072  0.300231  0.410477
          SoilCrop Maize
            LL=[0.19026, 0.177278, 0.196901, 0.196901, 0.226479, 0.203685, 0.182072]
            KL=[0.08, 0.08, 0.08, 0.08, 0.08, 0.0647333, 0.0478]
            XF=[1, 1, 1, 1, 1, 1, 1]
          SoilCrop Soybean
            LL=[0.19026, 0.177278, 0.196901, 0.196901, 0.226479, 0.203685, 0.182072]
            KL=[0.08, 0.08, 0.08, 0.08, 0.08, 0.0647333, 0.0478]
            XF=[1, 1, 1, 1, 1, 1, 1]
        SoilWater: same as Generic.paddock1.Soil.SoilWater
        SoilOrganicMatter: same as Generic.paddock5.Soil.SoilOrganicMatter
        Analysis: Thickness=[45.0, 46, 75, 123, 204, 336, 554]
          PH=[5.9768, 5.86461, 5.90998, 5.90998, 5.66004, 6.13217, 6.75094]
        Sample Initial nitrogen
          Thickness  NO3       NH4
          45.0       4.90377   .1
          46         2.35002   .1
          75         2.28406   .1
          123        2.28406   .1
          204        0.962734  .1
          336        0.4964    .1
          554        0.540428  .1
          Date = 01/01/2018  # Sample date
        InitialWater: FractionFull=0.449717; PercentMethod=EvenlyDistributed; RelativeTo=ll15
      surfaceom SurfaceOrganicMatter
        PoolName = OrganicMatter  # Organic Matter pool name
        type = maize  # Organic Matter type
        mass = 1200.27  # Initial surface residue (kg/ha)
        cnr = 80.0  # C:N ratio of initial residue
        standing_fraction = 0  # Fraction of residue standing
      fertiliser
      Maize
        ini: filename=Maize.xml
      Soybean
        ini: filename=Soybean.xml
      folder Manager folder
        operations
          08/05/2018  Maize sow plants = 8.4, sowing_depth = 38, cultivar = CC0012, row_spacing = 762.0, crop_class = plant
          09/10/2018  Maize harvest
          09/10/2018  Maize end_crop
          08/05/2018  fertiliser apply amount = 101 (kg/ha), type = urea_N, depth = 60 (mm)
          08/05/2018  fertiliser apply amount = 288.57 (kg/ha), type = NH4NO3, depth = 60 (mm)
          08/05/2018  SurfaceOrganicMatter tillage type=disc, f_incorp=0, tillage_depth=50
          24/10/2018  SurfaceOrganicMatter tillage type=chisel, f_incorp=0, tillage_depth=150
          17/05/2019  Soybean sow plants = 34.6, sowing_depth = 38, cultivar = Asgrow_AG4403_4.0, row_spacing = 7620.0, crop_class = plant
          09/10/2019  Soybean harvest
          09/10/2019  Soybean end_crop
        manager Reset: same as Generic.paddock11.Manager folder.Reset
      manager derived variables
        on start_of_day:
        script: same as in Generic.paddock5.derived variables
      tracker: same as Generic.paddock11.tracker
    area paddock13
      metfile met: filename=met00002.met
      Soil: Site=?
        Comment = ICASA Classification: Unknown  # Comments
        DataSource = GSDE
        Water
          Thickness  BD       AirDry     LL15      DUL       SAT
          45.0       1.21005  0.08223    0.16446   0.331975  0.42858
          46         1.45044  0.078787   0.157574  0.324064  0.422942
          75         1.42419  0.090653   0.181306  0.356323  0.444073
          123        1.42419  0.090653   0.181306  0.356323  0.444073
          204        1.50892  0.1059805  0.211961  0.376606  0.461985
          336        1.46405  0.1178205  0.235641  0.386365  0.469404
          554        1.64674  0.0794515  0.158903  0.29635   0.410707
          SoilCrop Maize
            LL=[0.16446, 0.157574, 0.181306, 0.181306, 0.211961, 0.235641, 0.158903]
            KL=[0.08, 0.08, 0.08, 0.08, 0.08, 0.0647333, 0.0478]
            XF=[1, 1, 1, 1, 1, 1, 1]
          SoilCrop Soybean
            LL=[0.16446, 0.157574, 0.181306, 0.181306, 0.211961, 0.235641, 0.158903]
            KL=[0.08, 0.08, 0.08, 0.08, 0.08, 0.0647333, 0.0478]
            XF=[1, 1, 1, 1, 1, 1, 1]
        SoilWater: same as Generic.paddock1.Soil.SoilWater
        SoilOrganicMatter: RootCN=45; RootWt=500; SoilCN=14.5; EnrACoeff=7.4; EnrBCoeff=0.2
          Thickness  OC        FBiom  FInert
          45.0       4.12215   0.04   0.4
          46         2.04392   0.035  0.4
          75         2.40171   0.03   0.410667
          123        2.40171   0.025  0.492667
          204        1.14242   0.02   0.628667
          336        1.01382   0.015  0.890833
          554        0.692981  0.01   0.95
        Analysis: Thickness=[45.0, 46, 75, 123, 204, 336, 554]
          PH=[5.40255, 6.11333, 5.70378, 5.70378, 6.0247, 6.14831, 7.2463]
        Sample Initial nitrogen
          Thickness  NO3       NH4
          45.0       4.12215   .1
          46         2.04392   .1
          75         2.40171   .1
          123        2.40171   .1
          204        1.14242   .1
          336        1.01382   .1
          554        0.692981  .1
          Date = 01/01/2018  # Sample date
        InitialWater: FractionFull=0.384144; PercentMethod=EvenlyDistributed; RelativeTo=ll15
      surfaceom SurfaceOrganicMatter
        PoolName = OrganicMatter  # Organic Matter pool name
        type = maize  # Organic Matter type
        mass = 2354.75  # Initial surface residue (kg/ha)
        cnr = 80.0  # C:N ratio of initial residue
        standing_fraction = 0  # Fraction of residue standing
      fertiliser
      Maize
        ini: filename=Maize.xml
      Soybean
        ini: filename=Soybean.xml
      folder Manager folder
        operations
          08/05/2018  Maize sow plants = 8.4, sowing_depth = 38, cultivar = CC0013, row_spacing = 762.0, crop_class = plant
          09/10/2018  Maize harvest
          09/10/2018  Maize end_crop
          08/05/2018  fertiliser apply amount = 101 (kg/ha), type = urea_N, depth = 60 (mm)
          08/05/2018  fertiliser apply amount = 288.57 (kg/ha), type = NH4NO3, depth = 60 (mm)
          08/05/2018  SurfaceOrganicMatter tillage type=disc, f_incorp=0, tillage_depth=50
          24/10/2018  SurfaceOrganicMatter tillage type=chisel, f_incorp=0, tillage_depth=150
          17/05/2019  Soybean sow plants = 34.6, sowing_depth = 38, cultivar = Becks_367NRR_3.7, row_spacing = 7620.0, crop_class = plant
          09/10/2019  Soybean harvest
          09/10/2019  Soybean end_crop
        manager Reset: same as Generic.paddock11.Manager folder.Reset
      manager derived variables
        on start_of_day:
        script: same as in Generic.paddock5.derived variables
      tracker: same as Generic.paddock11.tracker
    area paddock14
      metfile met: filename=met00002.met
      Soil: Site=?
        Comment = ICASA Classification: Unknown  # Comments
        DataSource = GSDE
        Water
          Thickness  BD       AirDry     LL15      DUL       SAT
          45.0       1.21509  0.0948635  0.189727  0.352507  0.443755
          46         1.45083  0.0978105  0.195621  0.35979   0.4483
          75         1.50464  0.104458   0.208916  0.36756   0.454455
          123        1.50464  0.104458   0.208916  0.36756   0.454455
          204        1.35621  0.0995465  0.199093  0.365864  0.452449
          336        1.56616  0.0956845  0.191369  0.349106  0.440251
          554        1.5622   0.0914745  0.182949  0.307163  0.41436
          SoilCrop Maize
            LL=[0.189727, 0.195621, 0.208916, 0.208916, 0.199093, 0.191369, 0.182949]
            KL=[0.08, 0.08, 0.08, 0.08, 0.08, 0.0647333, 0.0478]
            XF=[1, 1, 1, 1, 1, 1, 1]
          SoilCrop Soybean
            LL=[0.189727, 0.195621, 0.208916, 0.208916, 0.199093, 0.191369, 0.182949]
            KL=[0.08, 0.08, 0.08, 0.08, 0.08, 0.0647333, 0.0478]
            XF=[1, 1, 1, 1, 1, 1, 1]
        SoilWater: same as Generic.paddock1.Soil.SoilWater
        SoilOrganicMatter: RootCN=45; RootWt=500; SoilCN=14.5; EnrACoeff=7.4; EnrBCoeff=0.2
          Thickness  OC        FBiom  FInert
          45.0       5.13973   0.04   0.4
          46         2.37505   0.035  0.4
          75         1.7142    0.03   0.410667
          123        1.7142    0.025  0.492667
          204        0.721188  0.02   0.628667
          336        0.869868  0.015  0.890833
          554        0.441042  0.01   0.95
        Analysis: Thickness=[45.0, 46, 75, 123, 204, 336, 554]
          PH=[4.96257, 5.53178, 5.57747, 5.57747, 5.86361, 6.43505, 7.17454]
        Sample Initial nitrogen
          Thickness  NO3       NH4
          45.0       5.13973   .1
          46         2.37505   .1
          75         1.7142    .1
          123        1.7142    .1
          204        0.721188  .1
          336        0.869868  .1
          554        0.441042  .1
          Date = 01/01/2018  # Sample date
        InitialWater: FractionFull=0.518625; PercentMethod=EvenlyDistributed; RelativeTo=ll15
      surfaceom SurfaceOrganicMatter
        PoolName = OrganicMatter  # Organic Matter pool name
        type = maize  # Organic Matter type
        mass = 988.771  # Initial surface residue (kg/ha)
        cnr = 80.0  # C:N ratio of initial residue
        standing_fraction = 0  # Fraction of residue standing
      fertiliser
      Maize
        ini: filename=Maize.xml
      Soybean
        ini: filename=Soybean.xml
      folder Manager folder
        operations
          08/05/2018  Maize sow plants = 8.4, sowing_depth = 38, cultivar = CC0014, row_spacing = 762.0, crop_class = plant
          09/10/2018  Maize harvest
          09/10/2018  Maize end_crop
          08/05/2018  fertiliser apply amount = 101 (kg/ha), type = urea_N, depth = 60 (mm)
          08/05/2018  fertiliser apply amount = 288.57 (kg/ha), type = NH4NO3, depth = 60 (mm)
          08/05/2018  SurfaceOrganicMatter tillage type=disc, f_incorp=0, tillage_depth=50
          24/10/2018  SurfaceOrganicMatter tillage type=chisel, f_incorp=0, tillage_depth=150
          17/05/2019  Soybean sow plants = 34.6, sowing_depth = 38, cultivar = Mississippi_4.4, row_spacing = 7620.0, crop_class = plant
          09/10/2019  Soybean harvest
          09/10/2019  Soybean end_crop
        manager Reset: same as Generic.paddock11.Manager folder.Reset
      manager derived variables
        on start_of_day:
        script: same as in Generic.paddock5.derived variables
      tracker: same as Generic.paddock11.tracker
    area paddock15
      metfile met: filename=met00002.met
      Soil: Site=?
        Comment = ICASA Classification: Unknown  # Comments
        DataSource = GSDE
        Water
          Thickness  BD       AirDry     LL15      DUL       SAT
          45.0       1.2922   0.076318   0.152636  0.362964  0.42571
          46         1.4302   0.0680335  0.136067  0.357503  0.413008
          75         1.44627  0.0914525  0.182905  0.367059  0.440661
          123        1.44627  0.0914525  0.182905  0.367059  0.440661
          204        1.61926  0.110716   0.221432  0.386197  0.463292
          336        1.46569  0.113957   0.227914  0.388759  0.466335
          554        1.67171  0.082596   0.165192  0.302523  0.398719
          SoilCrop Maize
            LL=[0.152636, 0.136067, 0.182905, 0.182905, 0.221432, 0.227914, 0.165192]
            KL=[0.08, 0.08, 0.08, 0.08, 0.08, 0.0647333, 0.0478]
            XF=[1, 1, 1, 1, 1, 1, 1]
          SoilCrop Soybean
            LL=[0.152636, 0.136067, 0.182905, 0.182905, 0.221432, 0.227914, 0.165192]
            KL=[0.08, 0.08, 0.08, 0.08, 0.08, 0.0647333, 0.0478]
            XF=[1, 1, 1, 1, 1, 1, 1]
        SoilWater: same as Generic.paddock1.Soil.SoilWater
        SoilOrganicMatter: RootCN=45; RootWt=500; SoilCN=14.5; EnrACoeff=7.4; EnrBCoeff=0.2
          Thickness  OC        FBiom  FInert
          45.0       5.63826   0.04   0.4
          46         2.42142   0.035  0.4
          75         2.22091   0.03   0.410667
          123        2.22091   0.025  0.492667
          204        1.15134   0.02   0.628667
          336        0.91645   0.015  0.890833
          554        0.506292  0.01   0.95
        Analysis: Thickness=[45.0, 46, 75, 123, 204, 336, 554]
          PH=[5.8106, 5.69844, 5.63311, 5.63311, 5.78827, 6.28991, 6.20709]
        Sample Initial nitrogen
          Thickness  NO3       NH4
          45.0       5.63826   .1
          46         2.42142   .1
          75         2.22091   .1
          123        2.22091   .1
          204        1.15134   .1
          336        0.91645   .1
          554        0.506292  .1
          Date = 01/01/2018  # Sample date
        InitialWater: FractionFull=0.401751; PercentMethod=EvenlyDistributed; RelativeTo=ll15
      surfaceom SurfaceOrganicMatter
        PoolName = OrganicMatter  # Organic Matter pool name
        type = maize  # Organic Matter type
        mass = 1761.67  # Initial surface residue (kg/ha)
        cnr = 80.0  # C:N ratio of initial residue
        standing_fraction = 0  # Fraction of residue standing
      fertiliser
      Maize
        ini: filename=Maize.xml
      Soybean
        ini: filename=Soybean.xml
      folder Manager folder
        operations
          08/05/2018  Maize sow plants = 8.4, sowing_depth = 38, cultivar = CC0015, row_spacing = 762.0, crop_class = plant
          09/10/2018  Maize harvest
          09/10/2018  Maize end_crop
          08/05/2018  fertiliser apply amount = 101 (kg/ha), type = urea_N, depth = 60 (mm)
          08/05/2018  fertiliser apply amount = 288.57 (kg/ha), type = NH4NO3, depth = 60 (mm)
          08/05/2018  SurfaceOrganicMatter tillage type=disc, f_incorp=0, tillage_depth=50
          24/10/2018  SurfaceOrganicMatter tillage type=chisel, f_incorp=0, tillage_depth=150
          17/05/2019  Soybean sow plants = 34.6, sowing_depth = 38, cultivar = Mississippi_4.4, row_spacing = 7620.0, crop_class = plant
          09/10/2019  Soybean harvest
          09/10/2019  Soybean end_crop
        manager Reset: same as Generic.paddock11.Manager folder.Reset
      manager derived variables
        on start_of_day:
        script: same as in Generic.paddock5.derived variables
      tracker: same as Generic.paddock11.tracker
    area paddock16
      metfile met: filename=met00000.met
      Soil: Site=?
        Comment = ICASA Classification: Unknown  # Comments
        DataSource = GSDE
        Water: same as Generic.paddock11.Soil.Water
        SoilWater: same as Generic.paddock1.Soil.SoilWater
        SoilOrganicMatter: same as Generic.paddock11.Soil.SoilOrganicMatter
        Analysis: Thickness=[45.0, 46, 75, 123, 204, 336, 554]
          PH=[5.11605, 5.57567, 5.96775, 5.96775, 5.11541, 5.86435, 6.51661]
        Sample Initial nitrogen
          Thickness  NO3       NH4
          45.0       3.37794   .1
          46         1.85171   .1
          75         1.68744   .1
          123        1.68744   .1
          204        1.24905   .1
          336        0.632088  .1
          554        0.329393  .1
          Date = 01/01/2018  # Sample date
        InitialWater: FractionFull=0.35584; PercentMethod=EvenlyDistributed; RelativeTo=ll15
      surfaceom SurfaceOrganicMatter
        PoolName = OrganicMatter  # Organic Matter pool name
        type = maize  # Organic Matter type
        mass = 439.955  # Initial surface residue (kg/ha)
        cnr = 80.0  # C:N ratio of initial residue
        standing_fraction = 0  # Fraction of residue standing
      fertiliser
      Maize
        ini: filename=Maize.xml
      Soybean
        ini: filename=Soybean.xml
      folder Manager folder
        operations
          08/05/2018  Maize sow plants = 8.4, sowing_depth = 38, cultivar = CC0016, row_spacing = 762.0, crop_class = plant
          09/10/2018  Maize harvest
          09/10/2018  Maize end_crop
          08/05/2018  fertiliser apply amount = 101 (kg/ha), type = urea_N, depth = 60 (mm)
          08/05/2018  fertiliser apply amount = 288.57 (kg/ha), type = NH4NO3, depth = 60 (mm)
          08/05/2018  SurfaceOrganicMatter tillage type=disc, f_incorp=0, tillage_depth=50
          24/10/2018  SurfaceOrganicMatter tillage type=chisel, f_incorp=0, tillage_depth=150
          17/05/2019  Soybean sow plants = 34.6, sowing_depth = 38, cultivar = Nebraska_3.5, row_spacing = 7620.0, crop_class = plant
          09/10/2019  Soybean harvest
          09/10/2019  Soybean end_crop
        manager Reset: same as Generic.paddock11.Manager folder.Reset
      manager derived variables
        on start_of_day:
        script: same as in Generic.paddock5.derived variables
      tracker: same as Generic.paddock11.tracker
    area paddock17
      metfile met: filename=met00009.met
      Soil: Site=?
        Comment = ICASA Classification: Unknown  # Comments
        DataSource = GSDE
        Water
          Thickness  BD       AirDry     LL15      DUL       SAT
          45.0       1.21539  0.0853555  0.170711  0.362964  0.427808
          46         1.39808  0.0947305  0.189461  0.357503  0.444862
          75         1.43966  0.1115695  0.223139  0.367059  0.455187
          123        1.43966  0.1115695  0.223139  0.367059  0.455187
          204        1.57743  0.103518   0.207036  0.386197  0.462261
          336        1.6564   0.1065125  0.213025  0.388759  0.45798
          554        1.65216  0.0792155  0.158431  0.302523  0.404306
          SoilCrop Maize
            LL=[0.170711, 0.189461, 0.223139, 0.223139, 0.207036, 0.213025, 0.158431]
            KL=[0.08, 0.08, 0.08, 0.08, 0.08, 0.0647333, 0.0478]
            XF=[1, 1, 1, 1, 1, 1, 1]
          SoilCrop Soybean
            LL=[0.170711, 0.189461, 0.223139, 0.223139, 0.207036, 0.213025, 0.158431]
            KL=[0.08, 0.08, 0.08, 0.08, 0.08, 0.0647333, 0.0478]
            XF=[1, 1, 1, 1, 1, 1, 1]
        SoilWater: same as Generic.paddock1.Soil.SoilWater
        SoilOrganicMatter: RootCN=45; RootWt=500; SoilCN=14.5; EnrACoeff=7.4; EnrBCoeff=0.2
          Thickness  OC        FBiom  FInert
          45.0       3.39128   0.04   0.4
          46         1.6732    0.035  0.4
          75         2.12376   0.03   0.410667
          123        2.12376   0.025  0.492667
          204        1.49097   0.02   0.628667
          336        0.641235  0.015  0.890833
          554        0.698004  0.01   0.95
        Analysis: Thickness=[45.0, 46, 75, 123, 204, 336, 554]
          PH=[5.89664, 6.12154, 5.28319, 5.28319, 5.33576, 6.03349, 6.60953]
        Sample Initial nitrogen
          Thickness  NO3       NH4
          45.0       3.39128   .1
          46         1.6732    .1
          75         2.12376   .1
          123        2.12376   .1
          204        1.49097   .1
          336        0.641235  .1
          554        0.698004  .1
          Date = 01/01/2018  # Sample date
        InitialWater: FractionFull=0.064059; PercentMethod=EvenlyDistributed; RelativeTo=ll15
      surfaceom SurfaceOrganicMatter
        PoolName = OrganicMatter  # Organic Matter pool name
        type = maize  # Organic Matter type
        mass = 394.162  # Initial surface residue (kg/ha)
        cnr = 80.0  # C:N ratio of initial residue
        standing_fraction = 0  # Fraction of residue standing
      fertiliser
      Maize
        ini: filename=Maize.xml
      Soybean
        ini: filename=Soybean.xml
      folder Manager folder
        operations
          08/05/2018  Maize sow plants = 8.4, sowing_depth = 38, cultivar = CC0017, row_spacing = 762.0, crop_class = plant
          09/10/2018  Maize harvest
          09/10/2018  Maize end_crop
          08/05/2018  fertiliser apply amount = 101 (kg/ha), type = urea_N, depth = 60 (mm)
          08/05/2018  fertiliser apply amount = 288.57 (kg/ha), type = NH4NO3, depth = 60 (mm)
          08/05/2018  SurfaceOrganicMatter tillage type=disc, f_incorp=0, tillage_depth=50
          24/10/2018  SurfaceOrganicMatter tillage type=chisel, f_incorp=0, tillage_depth=150
          17/05/2019  Soybean sow plants = 34.6, sowing_depth = 38, cultivar = U98307162_3.6, row_spacing = 7620.0, crop_class = plant
          09/10/2019  Soybean harvest
          09/10/2019  Soybean end_crop
        manager Reset: same as Generic.paddock11.Manager folder.Reset
      manager derived variables
        on start_of_day:
        script: same as in Generic.paddock5.derived variables
      tracker: same as Generic.paddock11.tracker
    area paddock18
      metfile met: filename=met00003.met
      Soil: Site=?
        Comment = ICASA Classification: Unknown  # Comments
        DataSource = GSDE
        Water
          Thickness  BD       AirDry     LL15      DUL       SAT
          45.0       1.30316  0.0896665  0.179333  0.352877  0.442612
          46         1.43116  0.0986085  0.197217  0.357901  0.44689
          75         1.43543  0.0766585  0.153317  0.328725  0.423992
          123        1.43543  0.0766585  0.153317  0.328725  0.423992
          204        1.47162  0.1053505  0.210701  0.377081  0.462347
          336        1.59763  0.092351   0.184702  0.359649  0.446182
          554        1.70125  0.0752155  0.150431  0.267383  0.399292
          SoilCrop Maize
            LL=[0.179333, 0.197217, 0.153317, 0.153317, 0.210701, 0.184702, 0.150431]
            KL=[0.08, 0.08, 0.08, 0.08, 0.08, 0.0647333, 0.0478]
            XF=[1, 1, 1, 1, 1, 1, 1]
          SoilCrop Soybean
            LL=[0.179333, 0.197217, 0.153317, 0.153317, 0.210701, 0.184702, 0.150431]
            KL=[0.08, 0.08, 0.08, 0.08, 0.08, 0.0647333, 0.0478]
            XF=[1, 1, 1, 1, 1, 1, 1]
        SoilWater: same as Generic.paddock1.Soil.SoilWater
        SoilOrganicMatter: RootCN=45; RootWt=500; SoilCN=14.5; EnrACoeff=7.4; EnrBCoeff=0.2
          Thickness  OC        FBiom  FInert
          45.0       5.00805   0.04   0.4
          46         1.87299   0.035  0.4
          75         2.14509   0.03   0.410667
          123        2.14509   0.025  0.492667
          204        1.17579   0.02   0.628667
          336        0.82243   0.015  0.890833
          554        0.506576  0.01   0.95
        Analysis: Thickness=[45.0, 46, 75, 123, 204, 336, 554]
          PH=[5.53323, 6.24424, 5.23826, 5.23826, 5.89222, 6.9301, 6.72069]
        Sample Initial nitrogen
          Thickness  NO3       NH4
          45.0       5.00805   .1
          46         1.87299   .1
          75         2.14509   .1
          123        2.14509   .1
          204        1.17579   .1
          336        0.82243   .1
          554        0.506576  .1
          Date = 01/01/2018  # Sample date
        InitialWater: FractionFull=0.0823494; PercentMethod=EvenlyDistributed; RelativeTo=ll15
      surfaceom SurfaceOrganicMatter
        PoolName = OrganicMatter  # Organic Matter pool name
        type = maize  # Organic Matter type
        mass = 1828.68  # Initial surface residue (kg/ha)
        cnr = 80.0  # C:N ratio of initial residue
        standing_fraction = 0  # Fraction of residue standing
      fertiliser
      Maize
        ini: filename=Maize.xml
      Soybean
        ini: filename=Soybean.xml
      folder Manager folder
        operations
          08/05/2018  Maize sow plants = 8.4, sowing_depth = 38, cultivar = CC0018, row_spacing = 762.0, crop_class = plant
          09/10/2018  Maize harvest
          09/10/2018  Maize end_crop
          08/05/2018  fertiliser apply amount = 101 (kg/ha), type = urea_N, depth = 60 (mm)
          08/05/2018  fertiliser apply amount = 288.57 (kg/ha), type = NH4NO3, depth = 60 (mm)
          08/05/2018  SurfaceOrganicMatter tillage type=disc, f_incorp=0, tillage_depth=50
          24/10/2018  SurfaceOrganicMatter tillage type=chisel, f_incorp=0, tillage_depth=150
          17/05/2019  Soybean sow plants = 34.6, sowing_depth = 38, cultivar = U98311442_3.9, row_spacing = 7620.0, crop_class = plant
          09/10/2019  Soybean harvest
          09/10/2019  Soybean end_crop
        manager Reset: same as Generic.paddock11.Manager folder.Reset
      manager derived variables
        on start_of_day:
        script: same as in Generic.paddock5.derived variables
      tracker: same as Generic.paddock11.tracker
    area paddock19
      metfile met: filename=met00002.met
      Soil: Site=?
        Comment = ICASA Classification: Unknown  # Comments
        DataSource = GSDE
        Water: same as Generic.paddock14.Soil.Water
        SoilWater: same as Generic.paddock1.Soil.SoilWater
        SoilOrganicMatter: same as Generic.paddock14.Soil.SoilOrganicMatter
        Analysis: Thickness=[45.0, 46, 75, 123, 204, 336, 554]
          PH=[4.96257, 5.53178, 5.57747, 5.57747, 5.86361, 6.43505, 7.17454]
        Sample Initial nitrogen
          Thickness  NO3       NH4
          45.0       5.13973   .1
          46         2.37505   .1
          75         1.7142    .1
          123        1.7142    .1
          204        0.721188  .1
          336        0.869868  .1
          554        0.441042  .1
          Date = 01/01/2018  # Sample date
        InitialWater: FractionFull=0.295463; PercentMethod=EvenlyDistributed; RelativeTo=ll15
      surfaceom SurfaceOrganicMatter
        PoolName = OrganicMatter  # Organic Matter pool name
        type = maize  # Organic Matter type
        mass = 19.8781  # Initial surface residue (kg/ha)
        cnr = 80.0  # C:N ratio of initial residue
        standing_fraction = 0  # Fraction of residue standing
      fertiliser
      Maize
        ini: filename=Maize.xml
      Soybean
        ini: filename=Soybean.xml
      folder Manager folder
        operations
          08/05/2018  Maize sow plants = 8.4, sowing_depth = 38, cultivar = CC0019, row_spacing = 762.0, crop_class = plant
          09/10/2018  Maize harvest
          09/10/2018  Maize end_crop
          08/05/2018  fertiliser apply amount = 101 (kg/ha), type = urea_N, depth = 60 (mm)
          08/05/2018  fertiliser apply amount = 288.57 (kg/ha), type = NH4NO3, depth = 60 (mm)
          08/05/2018  SurfaceOrganicMatter tillage type=disc, f_incorp=0, tillage_depth=50
          24/10/2018  SurfaceOrganicMatter tillage type=chisel, f_incorp=0, tillage_depth=150
          17/05/2019  Soybean sow plants = 34.6, sowing_depth = 38, cultivar = Nebraska_3.5, row_spacing = 7620.0, crop_class = plant
          09/10/2019  Soybean harvest
          09/10/2019  Soybean end_crop
        manager Reset: same as Generic.paddock11.Manager folder.Reset
      manager derived variables
        on start_of_day:
        script: same as in Generic.paddock5.derived variables
      tracker: same as Generic.paddock11.tracker
    area paddock20
      metfile met: filename=met00001.met
      Soil: Site=?
        Comment = ICASA Classification: Unknown  # Comments
        DataSource = GSDE
        Water
          Thickness  BD       AirDry     LL15      DUL       SAT
          45.0       1.20845  0.080913   0.161826  0.332521  0.428621
          46         1.28501  0.08515    0.1703    0.344434  0.435266
          75         1.41738  0.0942455  0.188491  0.349394  0.440345
          123        1.41738  0.0942455  0.188491  0.349394  0.440345
          204        1.49374  0.0840245  0.168049  0.34953   0.436723
          336        1.54603  0.0973175  0.194635  0.355903  0.444991
          554        1.67287  0.077805   0.15561   0.289777  0.407841
          SoilCrop Maize
            LL=[0.161826, 0.1703, 0.188491, 0.188491, 0.168049, 0.194635, 0.15561]
            KL=[0.08, 0.08, 0.08, 0.08, 0.08, 0.0647333, 0.0478]
            XF=[1, 1, 1, 1, 1, 1, 1]
          SoilCrop Soybean
            LL=[0.161826, 0.1703, 0.188491, 0.188491, 0.168049, 0.194635, 0.15561]
            KL=[0.08, 0.08, 0.08, 0.08, 0.08, 0.0647333, 0.0478]
            XF=[1, 1, 1, 1, 1, 1, 1]
        SoilWater: same as Generic.paddock1.Soil.SoilWater
        SoilOrganicMatter: RootCN=45; RootWt=500; SoilCN=14.5; EnrACoeff=7.4; EnrBCoeff=0.2
          Thickness  OC        FBiom  FInert
          45.0       4.85976   0.04   0.4
          46         2.43247   0.035  0.4
          75         1.10223   0.03   0.410667
          123        1.10223   0.025  0.492667
          204        0.912768  0.02   0.628667
          336        0.71618   0.015  0.890833
          554        0.506073  0.01   0.95
        Analysis: Thickness=[45.0, 46, 75, 123, 204, 336, 554]
          PH=[5.69381, 5.6274, 6.16929, 6.16929, 5.57685, 5.48967, 7.31059]
        Sample Initial nitrogen
          Thickness  NO3       NH4
          45.0       4.85976   .1
          46         2.43247   .1
          75         1.10223   .1
          123        1.10223   .1
          204        0.912768  .1
          336        0.71618   .1
          554        0.506073  .1
          Date = 01/01/2018  # Sample date
        InitialWater: FractionFull=0.29837; PercentMethod=EvenlyDistributed; RelativeTo=ll15
      surfaceom SurfaceOrganicMatter
        PoolName = OrganicMatter  # Organic Matter pool name
        type = maize  # Organic Matter type
        mass = 2080.06  # Initial surface residue (kg/ha)
        cnr = 80.0  # C:N ratio of initial residue
        standing_fraction = 0  # Fraction of residue standing
      fertiliser
      Maize
        ini: filename=Maize.xml
      Soybean
        ini: filename=Soybean.xml
      folder Manager folder
        operations
          08/05/2018  Maize sow plants = 8.4, sowing_depth = 38, cultivar = CC0020, row_spacing = 7620.0, crop_class = plant
          09/10/2018  Maize harvest
          09/10/2018  Maize end_crop
          08/05/2018  fertiliser apply amount = 101 (kg/ha), type = urea_N, depth = 60 (mm)
          08/05/2018  fertiliser apply amount = 288.57 (kg/ha), type = NH4NO3, depth = 60 (mm)
          08/05/2018  SurfaceOrganicMatter tillage type=disc, f_incorp=0, tillage_depth=50
          24/10/2018  SurfaceOrganicMatter tillage type=chisel, f_incorp=0, tillage_depth=150
          17/05/2019  Soybean sow plants = 34.6, sowing_depth = 38, cultivar = Asgrow_AG4403_4.0, row_spacing = 7620.0, crop_class = plant
          09/10/2019  Soybean harvest
          09/10/2019  Soybean end_crop
        manager Reset: same as Generic.paddock11.Manager folder.Reset
      manager derived variables
        on start_of_day:
        script: same as in Generic.paddock5.derived variables
      tracker: same as Generic.paddock11.tracker
